# ____________Geometric data of SuperStructure_______________________________________________________________________
# 3.2 Statical Calculation for SuperStrucuture
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# Preliminary dimension
# clear roadway width:--------------------------------------------------------------
R_w := 7.3 m
# side walk width:--------------------------------------------------------------------
S_w := 0.8 m  # ...... x2.... becomes 1.6m...
# total bridge width:------------------------------------------------------------------
T_bw := 8.9 m
# number of Lane:--------------------------------------------------------------------
n_L := 2
# number of girders:------------------------------------------------------------------
n_g := 4
# clear span:----------------------------------------------------------------------------
S_p := 15 m
# c/c girder spacing:------------------------------------------------------------------
G_sp := 2.3 m
# end of slab to center of ex girder:---------------------------------------------
G_cs := 1 m
# top slab thickness:----------------------------------------------------------------
S_t := 0.3 m
# Minimum recommended thickness of the slab, to control deflection is  t_s.min=185 mm.
# (ERA BDM 2013, Article 5.4.1.1)
# Deck slab thickness not less than the clear span between fillets, haunches, or webs divided by 20,
# unless transverse ribs at a spacing equal to the clear span are used [AASHTO Art. 5.14.1.5.1a]
# Minimum recommended depth for continuous slabs. ...... >>>>>>>>  AASHTO (Table 2.5.2.6.3-1)
D_tpSLabw := Round((G_sp + 3000 mm)*mm/(30 mm), 100 mm) = 200 mm
# fillet:-------------------------------------------------------------------------------------
f := 0.1 m
# diaphram depth:---------------------------------------------------------------------
D_d := 0.8 m
# dipahram width:----------------------------------------------------------------------
D_w := 0.3 m
# web width:-----------------------------------------------------------------------------
W_w := 0.5 m
# Minimum thickness of the web, b_min=200 mm without prestressing duct. [AASHTO Art. 5.14.1.3.1c]
# row are used: Assume 4 bars in one row are used  [AASHTO Art. 5.10.3.1.1]
web_thick_min := 200 mm
ϕ_min := 4 mm
side_cover := 144.0 mm  # [AASHTO Art. 5.10.3.1.1]
W_w' := 4*ϕ_min + 3*(1.5*ϕ_min) + (2*side_cover) = 0.322 m
# Apparatus (dead manufacture)
# railing:-
# depth:-----------------------------------------------------------------------------------
D_r := 0.4 m
# width:------------------------------------------------------------------------------------
W_r := 0.2 m
# post:-
# depth:-----------------------------------------------------------------------------------
D_p := 0.25 m
# width:------------------------------------------------------------------------------------
W_p := 0.3 m
# spacing:---------------------------------------------------------------------------------
S_s := 1.7 m
# height:-----------------------------------------------------------------------------------
H_p := 0.9 m
# 3.2.1 Design specificaiton
# The governing specification is ERA bridge design manual 2013 in conjunction with AASHTOLRFD 2012
# ______________ Geometric data & material property ___________________________________________________________________
# 3.2.2 Geometric Requirment
# i.)Vertical alignment
# vertical alignment geometry is straight sloped.
# ii.)Horizontal alignment
# Geometry is tangent
# skew angle:--------------------------------------------
s_k := 0 deg
# Side walk width:---------------------------------------
S_sw := 0.8 m
# Width of support:---------------------------------------
S_ws := 0.6 m
# Total length of superStructure---------------------
T_Lss := 15.6 m
# Material property
# [component: outputs C_k]
# Type of concrete
# Charact cylinder compress Strength---------------
f'_c := C_k/1.25*MPa = 20 MPa
# Unit weight of concrete:----------------------------------
g_c := 24*kN/m^3
# Reinforcement ------- ART 9.4.1 –ERA 2013
# Grade-300 (less than 20 dia)
# yield strength---------------------
f_yk := 300 MPa
# tensile strength-------------------
f_s := 500 MPa
# Modulus of elasticity ------------
# of stee (Es)
E_s := 200 GPa
# Modulus of rapture(fr)-----------
f_r := 0.63*sqrt(f'_c*MPa) = 2.81745 MPa
# Modulus of elasticity -----------
# of concrete (Ec)
E_c := 4800*sqrt(f'_c*MPa) = 21466.3 MPa
# Modular ratio(n)-------------------
n := E_s/E_c = 9.31695
# Grade-420 (less than 20 dia)
# yield strength---------------------
f'_yk := 420 MPa
# tensile strength-------------------
f'_s := 620 MPa
# 3.2.2 Vehicular live load
# i.)Design lane load
# The design lane load shall consist of a load of 9.3 kN/mm uniformly distributed in the longitudinal
# directions transversally, the design lane load shall be assumed to be uniformly distributed over 3m
# width.
# i.)Design Truck
# Total load of design truck is 325 kN distributed between 3 axles. Front axle loading is 35KN and
# two rear axles loading is 145 kN each distance between front and first rear axle is 4.3m
# to 9m to produce extreme force effects.
# i.)Design Tandem
# Design tandem load is exceptional loading and shall be applied for military vehicle loading and
# for strategic bridges
# Design tandem comprised of a pair of 110KN axles spaced at 1.2m. Each
# axle comprised of two wheels spaced at 1.8m transversely
# 3.2.3 Resistance factors
Ø_mo := 0.9
Ø_sl := 0.8
β := 0.85
# rectangular compressive stress distribution is used rather
# than a more exact concrete stress distribution (AASHTO Art. 5.7.2.2)
# 3.2.4 Load factors and load combinations
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# Load Combinations
# Strength I: -----------------------------
1.25*DL + 1.75*LL
# Strength I: ------------------------------
DL + LL
# FatigueLoad:--------------------------- | 0.75*LL
# 3.3 Superstructure design
# 3.3.1 Over hang slab design
# dimension of railing and post
# distance b/n post & slab end----------
d_s := 0.05 m
# center to center of post ----------------
c_p := 1.7 m
# height of post-------------------------------
h_p := 0.9 m
# depth of post-------------------------------
d_p := 0.25 m
# width of post-------------------------------
w_p := 0.3 m
# depth of railing-----------------------------
d_r := 0.4 m
# width of railing-----------------------------
w_r := 0.2 m
# Girder Spacing and overhang
# Number of griders, N_g----------------
N_g := floor(R_w/G_sp) + 1 = 4
# ( Four girders with c/c spacing of 2.3 m are used.)
# C_x ------------------- distance from the edge of the curb to the centerline of the exterior girder
# B_c  ----------------- Bottom width of the barrier
# C_w ------------------- Curb width (=0.83m)
C_w := 0.83 m
C_x := 0.5*(R_w - (N_g - 1)*G_sp) = 0.2 m
w_p + C_x + C_w = 1.33 m  # -------------------------- (Overhang)
# Number of lanes loaded
# --------------------------------------
No_Lane_Ld := floor(□)  # error: This '(' requires a matching ')'.
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# ___________________  Dead  Load  ______________________________________________________________________________
# 3.3.1.1 Dead load calculation
# 1.) Sidewalk
D_s := S_sw*d_p*g_c = 4.8 kN/m
# Moment calculation
M_Ds := D_s*0.8/2*m = 1.92 kN
# 2) Overhang slab
w_1 := 0.8*m*g_c*w_r = 3.84 kN/m
# Moment calculation
M_w1 := w_1*0.4*m = 1.536 kN
w_2 := (1/2*0.8*m*0.1*m)*g_c = 0.96 kN/m
# Moment calculation
M_w2 := w_2*1/3*0.8*m = 0.256 kN
# 3) Railing
W_tr := (d_r*w_r)*g_c = 1.92 kN/m
# Moment arm calculation
M_arm := (0.8 m - (0.05 m + 0.3/2*m + 0.2/2*m)) = 0.5 m
# Moment calculation
M_wr := W_tr*M_arm = 0.96 kN
# 4/ Post
# Number of post:----------------
n_p := T_Lss/c_p = 9.17647
# distribute this throughout the length:-
n_p/T_Lss*m = 0.588235
W_tp := (w_p*d_p*g_c*h_p)*n_p/T_Lss = 0.952941 kN/m
# Moment arm calculation
M_apo := S_sw - (d_s + w_p/2) = 0.6 m
# Moment calculation
M_oPO := M_apo*W_tp = 0.571765 kN
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M_DL := (M_Ds + M_w1 + M_w2 + M_wr + M_oPO) = 5.24376 kN
# ___________________  Live  Load  _______________________________________________________________________________
# 3.3.1.2 Live load
# 1) Railing load
# E is effective width... distance in which the loas is applied/ distributed too
# x ..is distance in mm from center of the post to the edge of the support
x := 0.8 m - (d_s + w_p/2) = 0.6 m
E := 1140 mm + 0.833*x = 1.6398 m
# The railing load is 44.51 KN | ..... AASHTO, Art 2.7 spec
P_rL := 44.51 kN
# Railing Live Load... is give as below
R_LL := P_rL/E = 27.1436 kN/m
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M_armRail := h_p + w_r/2 = 1 m
# Moment due to railing load (M_ORL)
M'_oRL := R_LL*M_armRail = 27.1436 kN
# Impact factor
IF := 33 %
IF' := IF + 100 % = 1.33
M_oRL := IF'*M'_oRL = 36.1009 kN
# 2) Truckload
# (ERA-BDM, 2013 Art. 3.9.4)
P_tL := 15*kN/m
x_tL := 0.8 m - (w_p + w_p + d_s) = 0.15 m  # ...... moment arm
M'_oTL := P_tL*x_tL = 2.25 kN
M_oTL := IF'*M'_oTL = 2.9925 kN
# 3) pedestrian live load
P_LL := 4.0*kN/m^2
LL_p := P_LL*0.8*m = 3.2 kN/m
M_armExteGir := 0.8/2*m = 0.4 m
M_oPLL := M_armExteGir*LL_p = 1.28 kN  # .....  not objected to dynamic allowance
# Total live load(M_LL) = collision load + truck load + pedestrian load
M_LL := (30 kN*m/m + M_oTL + M_oPLL) = 34.2725 kN
# Combination of loads
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# Total design moment (at strength 1 limit state) M_Tot
M_Tot := 1.25*M_DL + 1.75*M_LL = 66.5316 kN
# Design for flexure
# Main reinforcement perpendicular to traffic
Ø_sher := 0.9
b := 1000 mm
d := 242 mm
Ø_slid := 0.8
β := 0.85
# ..... factor indicating ability of diagonally cracked concrete to transmit
# tension
ρ := (1 - sqrt(1 - 2*M_Tot*m/(Ø_mo*b*d^2*f'_c)))*f'_c/f_yk = 0.00434947
ρ_min := (0.03*f'_c/f_yk) = 0.002
# ducktility check
du := if(ρ > ρ_min, "okay", "not okay") = "okay"
# Area of reinforcement
A_s := ρ*b*d = 1052.57 mm^2
# Spacing
# Assume Ø16mm bars (keeping the initial assumption) as (area for a single bar)
Ø := 16 mm
A_si := π*Ø^2/4 = 201.062 mm^2
# spacing as calculated as S_sp
S_sp := Round(b*A_si/A_s, 10 mm) = 190 mm
# c/c
S_sp = 190 mm
# this is provided for overhang portion
# at both ends (left and right)
# hence, provide
Ø = 16 mm
# Revised reinforcement area
A_srev := b*A_si/S_sp = 1058.22 mm^2
# Fatigue limit state
# fatigue need not be investiagted for concrete deck slabs in multi
# girder applications
# ___________________  Deck slab design  ___________________________________________________________________________
# _________________ Dead Load ____________________________________________________________________________
# 3.3.2 Deck slab design
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# 3.3.2.1 Dead loads
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slab_load := g_c*W_r = 4.8 kN/m^2
Wear_surface_loads := 22.5*kN/m^3*d_s = 1.125 kN/m^2
L_y/L_x
T_Lss/G_sp = 6.78261
slab_type := if(T_Lss/G_sp > 2, "one way slab", "two way") = "one way slab"
# hence consider unit width ... i.e convert the above loads into a linear form
deck_load := slab_load*1*m = 4.8 kN/m
...*(deck*load)
wear_load := Wear_surface_loads*1*m = 1.125 kN/m
...*(wearing*surface*loads)
DL_Tot := deck_load + wear_load = 5.925 kN/m
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w := DL_Tot
L' := 2.3 m
R_1 := 0.4*w*L'
V_4 := 0.4*w*L'
M_1 := 0.08*w*L'^2
M_2 := 0.1*w*L'^2
V_1 := 0.4*w*L'
R_4 := 0.4*w*L'
M_4 := 0.1*w*L'^2
M_3 := 0.025*w*L'^2
R_2 := 1.10*w*L'
R_3 := 1.10*w*L'
M_5 := 0.08*w*L'^2
V_21 := 0.5*w*L'
V_32 := 0.5*w*L'
# force effect due to slab deck dead load
Max_supp_M_o := max(M_2, M_4) = 3.13432 kN*m
Max_spn_M_o := max(M_1, M_3, M_5) = 2.50746 kN*m
# Internal force effect due to wearing surface
w' := wear_load
R'_1 := 0.4*w'*L'
V'_4 := 0.4*w'*L'
M'_1 := 0.08*w'*L'^2
M'_2 := 0.1*w'*L'^2
V'_1 := 0.4*w'*L'
R'_4 := 0.4*w'*L'
M'_4 := 0.1*w'*L'^2
M'_3 := 0.025*w'*L'^2
R'_2 := 1.10*w'*L'
R'_3 := 1.10*w'*L'
M'_5 := 0.08*w'*L'^2
V'_21 := 0.5*w'*L'
V'_32 := 0.5*w'*L'
Max_supp_M'_o := max(M'_2, M'_4) = 0.595125 kN*m
Max_spn_M'_o := max(M'_1, M'_3, M'_5) = 0.4761 kN*m
Max_DL_sup_M_o := Max_supp_M_o + Max_supp_M'_o
Max_DL_sup_M_o = 3.72945 kN*m  # .................................. (support)
Max_DL_spn_M_o := Max_spn_M'_o + Max_spn_M_o
Max_DL_spn_M_o = 2.98356 kN*m  # ................................. (span)
# _________________ Live Load _____________________________________________________________________________
# 3.3.2.2 Live loads
# 1 Maximum positive live load moment
# Internal force effects
# need to find statically indetermindaet beam formula
# and design for shear and moment diagram influence line diagram
Max_pve_LLspn_M_o := 30.54 kN*m/m
Max_pve_LLsupp_M_o := 23.69 kN*m/m
# Equivalent strip width for postive moment.......
s' := 2300 mm
E' := 660 mm + 0.55*s' = 1.925 m
# Moment per strip............
M_oPst := Max_pve_LLspn_M_o/E' = 15.8649 kN/m
M_oTotPst := IF'*M_oPst = 21.1004 kN/m
# ... Multiple pressence factor is taken as one.
# because:-
7.3/3.6 = 2.02778
# 2 Maximum negative live load moment
# need to find statically indetermindaet beam formula
# and design for shear and moment diagram influence line diagram
Max_nve_LLsupp_M_o := 28.93 m*kN*m/m
Max_nve_LLspn_M_o := 22.11 m*kN*m/m
# Equivalent strip width for postive moment.......
E_widt := 1220 mm + 0.25*s' = 1.795 m
# Moment per strip............
M_o_nve_Pst := Max_nve_LLsupp_M_o/E_widt*m = 16.117 kN*m
M_o_nve_TotPst := IF'*M_o_nve_Pst = 21.4356 kN*m
# ... Multiple pressence factor of 1.2 is taken as one.
# because:-
M_o_Tot_nve := 1.2*M_o_nve_TotPst = 25.7227 kN*m  # .................................. (support)
# Dead load
# support (-ve) moment
Max_DL_sup_M_o = 3.72945 kN*m
# span (+ve) moment
Max_DL_spn_M_o = 2.98356 kN*m
# Live load
# support (-ve) moment
M_o_Tot_nve = 25.7227 kN*m
# span (+ve) moment
M_o_nve_TotPst = 21.4356 kN*m
# Design load combinations
# to hava the maximum effect Strength-I limit state shoud be used
# For negative moment
# overhanging dead load and span dead load moments are assumed to balance
# out for negative moment conservatively
M_sd_nve := 1.25*Max_DL_sup_M_o + 1.75*M_o_Tot_nve
M_sd_nve = 49.6766 kN*m
# For positive moment
# overhanging dead load and span dead load moments are assumed to balance
# out for negative moment conservatively
M_sd_pve := 1.25*Max_DL_spn_M_o + 1.75*M_o_nve_TotPst
M_sd_pve = 41.2417 kN*m
# 3.3.3 Flexural design
# 1. At support (negative moment)
# It should be noted that the concrete cover for the slab deck is 25mm
Conc_cover := 25 mm
d' := 167 mm
M_sd_nve = 49.6766 kN*m
Ø_mo = 0.9
f'_c = 20 MPa
f_yk = 300 MPa
ρ_1 := (1 - sqrt(1 - 2*M_sd_nve/(Ø_mo*b*d'^2*f'_c)))*f'_c/f_yk = 0.00696049
ρ_min = 0.002
d_u := if(ρ_1 > ρ_min, "okay", "not okay") = "okay"
# Area of reinforcement
A_sup := ρ_1*b*d
A_sup = 1684.44 mm^2
# Assume Ø16mm bars (keeping the initial assumption) as (area for a single bar)
A_si = 201.062 mm^2
# spacing
# spacing as calculated as S_si
S_si := Round(b*A_si/A_sup, 10 mm) = 120 mm
# Revised reinforcement area
A_srev_ := b*A_si/S_si = 1675.52 mm^2
# hence, provide
Ø = 16 mm
# c/c
S_si = 120 mm
# 2. At span
M_sd_pve = 41.2417 kN*m
Ø_mo = 0.9
ρ_2 := (1 - sqrt(1 - 2*M_sd_pve/(Ø_mo*b*d'^2*f'_c)))*f'_c/f_yk = 0.00572258
f'_c = 20 MPa
f_yk = 300 MPa
ρ_min = 0.002
d_sp := if(ρ_1 > ρ_min, "okay", "not okay") = "okay"
# Area of reinforcement
A_spn := ρ_2*b*d
A_spn = 1384.86 mm^2
# spacing
# spacing as calculated as S_su
S_su := Round(b*A_si/A_spn, 10 mm) = 150 mm
# Revised reinforcement area
A_srev_2 := b*A_si/S_su = 1340.41 mm^2
# hence, provide
Ø = 16 mm
# c/c
S_su = 150 mm
# 3.3.3.1 Distribution reinforcement
# The bottom distribution reinforcement is given as percentage of the main slab reinforcement
# ERA BDM-2013, Sec 12.6.2
A_sdis := (3480*mm/sqrt(G_sp*mm))*% = 72.563 %
A_sdis' := if(A_sdis ≤ 67 %, A_sdis, 67 %) = 67 %
A_sdis_fin := A_srev_2*A_sdis' = 898.077 mm^2
# for diameter of 14mm Area is:
Ø_mo2 := 14 mm
A_disi := π*Ø_mo2^2/4 = 153.938 mm^2
# spacing
# spacing as calculated as S_siu
S_siu := Round(b*A_disi/A_sdis_fin, 10 mm) = 170 mm
# Revised reinforcement area
A_srev_3 := b*A_disi/S_siu = 905.518 mm^2
# hence, provide
Ø_mo2 = 14 mm
# c/c
S_siu = 170 mm
# 3.3.3.2 Control of cracking by distribution of reinforcement
# To control flexural cracking, concrete shall be investigated at service load conditions, tension
# maximum reinforcement shall be well distributed with in flexural zones and components shall be
# proportioned that the tensile stress in the steel reinforcement at service limit state f_s would not
# exceed
# ERA-BDM, 2013 sec 9.4.5
Z := 30*kN/m  # ... crack width paramter assumed
c_c := 25 mm  # .... center of closet bar
d_c := c_c + Ø_mo2/2 = 32 mm
n_iw := 1000 mm/S_siu = 5.88235  # .... number of bars
A_i := b*2*d_c/n = 6869.2 mm^2
f_s2 := if(Z/(d_c*A_i)^(1/3) ≤ 0.6*f_yk, 0.6*f_yk, Z/(d_c*A_i)^(1/3)) = 0.18 kN/mm^2
# for crack control the maximum allowable stress is f._s2
# use the positive live load as the distribution bars are laid at the bottom part
M_sd := Max_DL_spn_M_o + M_o_nve_TotPst = 24.4192 kN*m
T_s := 200 mm
d' = 0.167 m
k := (ρ_2*n_iw + 0.5 mm*(T_s/d'^2))/(ρ*n_iw + (T_s/d'))
j := 1 - (k/3) = 0.98985
Max_stress := M_sd/(A_spn*j*d') = 0.106669 kN/mm^2
Stress_chk := if(Max_stress ≤ f_s2, "okay_with range", "not_okay")
Stress_chk = "okay_with range"
# 3.3.3.3 Temperature and shrinkage reinforcement
# Temperature and shrinkage reinforcement shall be added so that the total reinforcement on exposed
# surface is not less than the specified limit state below
d_a := 200 mm
A_grs := b*d_a = 200000 mm^2
Ø_b := 12 mm
A_s ≥ 0.75*A_grs/f_yk
A_sf := (0.5*500)*(mm^2) = 250 mm^2
A_sdf := π*Ø_b^2/4 = 113.097 mm^2
# spacing
# spacing as calculated as S_su
S_sr := Round(b*A_sdf/A_sf, 10 mm) = 450 mm
# hence, provide
Ø_b = 12 mm  # c/c
S_sr = 450 mm  # (top reinforcement on both direction).
# _______________  Longitudinal girder design  ______________________________________________________________________
# _________________ Exterior Girder Load ______________________________________________________________________
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# 3.4 LONGITUDINAL GIRDER DESIGN
# 3.4.1 Exterior girder Design
# Load effects
# 3.4.1.1 Dead loads
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# Weight determination
# overhang weight (previously computed)..
# However, for this section the following should be included
W_2 := g_sc*t*L  # ... deck slab
W_2 := g_sc*t*L  # ... deck slab
W_2 := g_sc*t*L  # ... deck slab
W_2 := g_sc*t*L  # ... deck slab
# Internal force effects (shear and bending)
# Assess and determine the flexural effects of the dead loads, which are namely
# over hang
# slab deck
# girder fillet
# wearing surface
# =
# Weight of diaphragms at two extreme points (support) and at a mid-span
# P1 -----for exterior girder
p_1 := □
# P2 -----for interior girder
p_2 := □
# Internal force effects
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# Live loads
# i) Force effect of lane load/ static
# The design lane load shall consist of a load of 9.3KN/m, uniformly distributed in long direction.
# (ERA-BMD, 2013 Art.3.8.5)
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# 3.4.1.2 Live load assessment for the exterior girder
# 1) Lever rule
# For T-girder Bridge, the following is the moment distribution factor for the exterior girder (I.E for
# two or more lanes loaded)
d_e := 0.8 m - d_s = 750 mm
C_f := 0.77 + d_e/(2800 mm) = 1.03786
# ...c/c spacing of girders
s_s := 2300 mm
T_Lss = 15600 mm
# .... both are concrete material
n_lo := 1
girder_dept := 1.1 m
deck_dpt := 0.2 m
h_u := girder_dept - deck_dpt = 0.9 m
b_u := 500 mm
I := b_u*h_u^3/12 = 3.0375e10 mm^4
E_q := ((girder_dept - deck_dpt)/2) + deck_dpt/2 = 550 mm
A_c := (girder_dept - deck_dpt)*w_p = 270000 mm^2
K_g := n_lo*(I + A_c*b_u^2) = 9.7875e10 mm^4
g_int := 0.075 + (s_s/(4300 mm))*0.6*(s_s/T_Lss)*0.2*(K_g/(T_Lss*deck_dpt^3))*0.1 = 0.0757422
DF := C_f*g_int = 0.0786095
# Reduction for skew angle
# The bending moment shall be reduced in accordance with the
# following parameters
# (ERA- BDM, 2013 Art 13.4.4)
C_1 := 0.25*(K_g/h*t*s^3)^0.25*(s/L)^0.5
# ........ if 0<30^o ,
C_1 := 0
# ........ if θ >60^o  use
θ := 60 deg
C_f' := 1 - C_1*(tan(θ)^1.5) = 1
D_flexure := C_f' + DF = 1.07861
# NB : The distribution factor stated on the manual for t-girder Bridge was determined without
# consideration of crossbeam effect (as these will be a good transversal distribution of force effects).
# Hence, the FEM will be a good option for having a good approximation since it assesses both
# longitudinal and transversal load distribution.
# 3.4.1.3 DF for moment (exterior girder) ---- (one lane loaded)
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# Apply lever rule
Given
p/2*2.05 + p/2*0.25 == 2.3*R_e
Find(R_e) → 0.5*p
p := 1
R_e := 0.5*p = 0.5
# Apply multiple presence factor of 1.2 (as stated above) because it is a lever rule product
g_mom := 1.2*R_e = 0.6
g_mom_ext := max(g_mom, DF) = 0.6
# 3.4.1.4 Distribution factor for shear (exterior girder)
# One design lane loaded | ..... apply the lever rule
# This is already computed on the previous page, assuming a multiple presence factor of 1.2, the
# shear distribution factor for the exterior is 0.6.
g_shearExt := 0.6
# Two or more design lane loaded
s_ss := 2300 mm
g_int' := 0.2 + s_ss/(3600 mm) - (s_ss/(10700 mm))^2 = 0.792684
g_ext := g_int'*(0.6 + d_e/(3000 mm)) = 0.673781
# NB : The distribution factor stated on the manual for t-girder Bridge was determined without
# consideration of crossbeam effect (as these will be a good transversal distribution of force effects).
# Hence, the FEM will be a good option for having a good approximation since it assesses both
# longitudinal and transversal load distribution
shear_DF := max(g_ext, 0.6) = 0.673781
# Now lets us find the maximum bending moment and maximum shear on the section. We already
# have the summary for the distribution factor for exterior girder.
DF_Ex_M_o := 0.6
# .... Exterior Girder
DF_Ex_S_her := 0.6
DF_In_M_o := 0.6  # .... Interior Girder
DF_In_S_her := 0.6
# 3.4.2 Load effect on the exterior girder
# 1) Truck loading (apply the AMBM (absolute maximum bending moment) rule)
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P_r := 2*145 + 35 = 325
P_1 := 145
P_2 := 145
x_r := (35*8.6 + 145*4.3)/P_r = 2.84462
P_3 := 35
# Since P2 is the closest to the PR, it will cause the maximum moment effect
M_max := (P_1*1.916) + (P_2*3.865) + (P_3*1.514) = 891.235
# 30% for dynamic allowance
M_all := 1.30*M_max = 1158.61
# Accounting for reaction factor....
M_maxR := 0.6*M_all = 695.163
# Maximum shear effect
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V_max := (145*1) + (145*0.724) + (35*0.448) = 265.66
# with 30% impoact load ...
V_all := 1.3*V_max = 345.358
# Design tandem loading
P_R := 220 kN  # .... resultant loading
# Moment determination
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M_tnd_max := (110*3.894) + (110*3.307) = 792.11
# Assuming 30% for an impact load IM
M_tnd_im := 1.3*M_tnd_max = 1029.74
# Shear force determination
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V_maxShr := (110*1) + (110*0.923) = 211.53
# Assuming 30% IM
V_max_im := 1.3*V_maxShr = 274.989
# _________________ Interior Girder Load _______________________________________________________________________
# 3.4.3 Load effect on the Interior girders
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# Dead loads
t := 200 mm
γ := 24*kN/mm^3
w_t1 := 2.3 m
w_t2 := 0.3 m
w_41 := 2.1 m
slab_deck := γ*t*w_t1
diaph := 2*(γ*w_2*w_t2) = 13824000000000 kN*Pa/m
girder := γ*(w_41 - w_1)*w_t4
11.04 + 10.8 + 0.24 + 5.175 = 27.255
fillet := γ*(w_41 - w_1)*w_t4
wearing_surf := γ*(w_41 - w_1)*w_t4
Total := slab_deck + girder + fillet + wearing_surf + diaph
# 3.4.3.1 Internal force effect due to dead load
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A_y == B_y
B_y := ((7.77*3) + (27.26*15.6))/2 = 224.283
# Factored loads
# Exterior girders
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# Interior girders
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# Load combination for girders
# 1) Exterior girder
# 1.25DL + 1.75(LL + IM) -......... ......(Strength limit-1)
# Moment
M__ex_mm := ((1.25*859.55) + (1.75*1441.91))*0.7 = 2518.45
# _________________________________________________
# 1.25DL + 1.75(LL + IM) -......... ......(Strength limit-1)
# Shear
V__ex_sh := ((1.25*859.55) + (1.75*1441.91))*0.7 = 2518.45
# _________________________________________________
# 2) Interior Girder
# 1.25DL + 1.75(LL + IM) -......... ......(Strength limit-1)
M__in_mm := ((1.25*859.55) + (1.75*1441.91))*0.7 = 2518.45
# _________________________________________________
# 1.25DL + 1.75(LL + IM) -......... ......(Strength limit-1)
V__in_sh := ((1.25*859.55) + (1.75*1441.91))*0.7 = 2518.45
# _________________________________________________
# 3.4.3.2 Design for flexure
# 3.4.3.2 Exterior girder design
# Determination of effective compression width (b_eff)
h_f := 0.25 m
c_w := 1.8 m
b_w := 0.5 m
e_ct := 0.8 m
x_1 := 1/4*T_Lss = 3.9 m
u_1 := b_w + c_w = 2.3 m
y_1 := (2*6*h_f) + b_w = 3.5 m
z_1 := b_w + (e_ct + c_w/2) = 2.2 m
B_eff := min(x_1, y_1, u_1, z_1) = 2.2 m
# Exterior girder
# Design constant and assumptions
# [component: outputs f_cu]
f_cd := 0.68*f_cu/1.5*MPa = 13.6 MPa
# [component: outputs f_yk1]
f_yd := f_yk1/1.15*MPa = 365.217 MPa
M_d := f_yd/(0.8*f_cd) = 33.5678
C_11 := 2.5/M_d = 0.0744762
C_22 := (f_yd*M_d)*0.4 = 4903.81 MPa
ε_s := f_yd/E_s = 0.00182609
ε_cu := 0.0035
ρ_b := 0.8*ε_cu/(ε_cu + ε_s)*f_cd/f_yd = 0.0195766
ρ := 0.75*P_b
# Check depth for deflection for both slab and beam
# Slab
d ≥ (0.4 + 0.6*f_yk/(400 MPa))*B_eff/30 = 1
d_ss := (0.4 + 0.6*f_yk/(400*MPa))*B_eff/30 = 0.0623333 m
c_cc := 25 mm
Ø_c := 14 mm
Ø_14mm := d_ss + c_cc + Ø_c/2 = 94.3333 mm
# Beam
d ≥ (0.4 + 0.6*f_yk/(400 MPa))*B_eff/20 = 1
d_bm := (0.4 + 0.6*f_yk/(400*MPa))*T_Lss/30 = 442 mm
spcs_max := max(1.5*f*L*mm, 38 mm)  # error: The forms of these values must match. This value has the form: Length^5, but others have the form: Length.
# Assume 2 raw of reinforcement
c_cm := 50 mm
Ø_12 := 14 mm
Ø_cm := 14 mm
Ø_32 := 14 mm
D := 1.1 m
Ø_24 := 24 mm
Ø_1mm := d_bm + c_cm + Ø_12 + Ø_32 + spcs_max/2
chk_depth := if(Ø_1mm ≤ d_bm, "okay", "not_okay_chk_depth")
chk_depth := □
# >>>. Check whether the beam is (should) be treated as T-section or rectangular section
d_d := D - (c_cm + Ø_12 + Ø_32 + Ø_24) = 998 mm
ρ := 1/2*(c_1 - sqrt(c_1^2 - 4*m/(c_2*b_e*d_g^2)))
x_x := ρ*m_m*d
y := 0.8*x_x
chk_T_sec := if(h_f > y, "Rectangular section", "T-Section")
# 3.4.3.3 Design for flexure
M_ds := 2840.765 kN*m
# Compute the actual tensile bar ratio
ρ := (1 - sqrt(1 - 2*M_Tot*m/(Ø_mo*b*d^2*f'_c)))*f'_c/f_yk = 0.00434947
ρ_min := (0.03*f'_c/f_yk) = 0.002
ρ_b := 0.8*ε_cu/(ε_cu + ε_s)*f_cd/f_yd
ρ_max := 0.75*ρ_b = 0.0146824
chk_ductility := if(ρ_min < ρ < ρ_max, "ductulity_okay", "not_okay")
chk_ductility = "ductulity_okay"
# Reinforcement area
A_s := ρ*b*d = 1052.57 mm^2
Ø := 32 mm
A_si := π*Ø^2/4 = 804.248 mm^2
n_ref := Round(A_s/A_si, 10) = 0
# hence, provide
Ø = 32 mm
# c/c
S_si = 120 mm
# Check the adequacy of the width (bw) to accommodate five bars in a raw
c_c_c := 50 mm
# ????????????????????????????????
# ????????????????????????????????
# 3.3.3.4 Design for shear
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# From similarity of triangles
Given
753.85 kN/(7.8 kN) == v_d/((7.8 - 0.982)*kN)
Find(v_d) → 658.942217949*kN  # .....shear at a distance of d from the support at an inclination of 45^0
V_d := 658.942217949
# Now determine V_Rd, (diagonal concrete compression capacity)
V_rd := 0.25*f_cd*b_w*d
cross_section_chk := if(V_rd > V_d, "no_need", "increase_cross_seciton")  # error: This value has units: Unitless, but must have units: Force.
# Shear resistance capacity of concrete (V_c )
V_c := 0.083*b_w*sqrt(f'_c)
ϕ := 0.9
ϕ*V_c
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# from similarity of triangle
Given
753.85/7.8 == 183/x_xt
Find(x_xt) → 1.89348013531
# Spacing
A_vs := 226.08
f_yk := 300
b_w := 500
S_spacin := min(A_vs*f_yk/(0.4*b_w), d, 800 mm)  # error: The forms of these values must match. This value has the form: Unitless, but others have the form: Length.
# hence, provide
Ø = 32 mm
# c/c
S_si = 120 mm
# Shear reinforcement design
# Left portion
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V_av := (183 kN + 658.94 kN)/2 = 420.97 kN
Given
V_av/x == 1830/1.90
Find(x) → 437.072677596*N
# Shear reinforcement from x=1.90 to 4.40m
V_s := A_vs*f_yd*d/s
V_s := V_sd - V_c
V_sd := V_av - V_c  # error: This value has units: Length^1/2 · Mass^1/2 · Time^-1, but must have units: Force.
S := 2*A_vs*f_yd*d/V_s
# Therefore, from x=1.9 to x = 4.4
# hence, provide
Ø = 32 mm
# c/c
S_si = 120 mm
# Reinforcement from x = 4.4 to support end
V_s := 753.85 - V_c  # error: This value has units: Length^1/2 · Mass^1/2 · Time^-1, but must have units: Unitless.
S := A_vs*f_yd*d/V_s
# Therefore, from x=1.9 to x = 4.4
# hence, provide
Ø = 32 mm
# c/c
S_si = 120 mm
# Maximum spacing
# The spacing of the transverse reinforcement shall not exceed the maximum permitted spacing S_max stated below
# (ERA BDM 2013 Art 7.7.1.5)
# f ?????????????????????????????????????????
# f ?????????????????????????????????????????
# f ?????????????????????????????????????????
# Summary of shear reinforcement with spacing (on both direction)
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# _______________  Torsional design / check for torsion________________________________________________________________
# 3.5 Torsional design / check for torsion
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# Dead load overhang
# Apparatus (guard rail)......................... | W_1
# Overhang slab................................... | W_2
# Sidewalk ......................................... | W_3
# Half of the girder................................ | W_4
# Slab portion
# Slab.................................................. | W_A
# Half of the girder.................................. | W_B
# Diaphragm......................................... | W_C
# Wearing surface................................. | W_D
# Overhang moment (clockwise negative)
# Apparatus (guard rail)
W_1 + W_2 := 6.55*kN/m  # error: A name is required here.
# Half of the girder
(0.9 m*0.25*m)*24*kN/m^3 = 5.4 kN/m
# Slab portion moment (counter clock wise (positive))
# Wearing surface
W_sur := 3.15*kN/m*(1.15/2*m^2/kN) = 1.81125 m
M_wsur := □
# Slab load
W_SLod := □
# Moment arm
M_m.arm := □
# Diaphragm
D_phrm := □
# Moment
M_diph := □
# Half girder + fillet
# Load
L_d := □
# Fillet
F_let := □
# Moment
M_mFlt := □
# Summary
# Total positive moment
M_pveTot := □
# Total negative moment
M_nveTot := □
# Net moment
M_net := □
# Factored moment
M_factTors := □
# There could be three combinations /alternatives, for which torsion could be caused on the exterior girder
# Case 1
# factored torsional moment.....
M_factTors := □
# Case 2
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# Railing load..........
Rai_Ld := 27.04*kN/m
# Truck load.............
Tru_Ld := 15*kN/m
# Pedestrian load.......
Ped_Ld := 4*kPa*0.8*m = 3.2 kN/m
# Railing load.............factored
Rai_LdIM := 1.33*Rai_Ld = 35.9632 kN/m
# Truck load................factored
Tru_LdIM := Tru_Ld*1.33 = 19.95 kN/m
# Case 2.1
# Moment arm for railing (impact) load.......................
M_armRail := □
# Truck load moment arm........................................
M_armTru := □
# Pedestrian load moment arm..................................
M_armPed := □
# Total overhang moment due to live load.......................
M_overHngLL := □
# The live load due to one line of wheel including the dynamic allowance
LL_oveHng := □
# Therefore Net moment /torsion................................
M_netTors := □
# Case 2.2
# Moment..........................................................
Max_mntArm := □
# Considering 33% impact load ...........................
Max_mntArmIM := □
# Torsion.........................................................
Tor_M := □
# Case 2.3
# When there is no vehicular (truck) load, hence only the overhang moments will be present.
# Torsion...................................................
Tor_Overh := □
# maximum moments will be...............................
Max_mm := □
# 3.5.1 Load combination
# Using the strength I load combination
D_LT := 3.82
LL_IM := 110.9
# Design torsion (T_U)..............................
T_u := 1.25*D_LT + 1.75*LL_IM
# If the factored torsion moment is less than one-quarter of the factored pure torsional cracking moment, it will
# cause only a very small reduction in shear capacity or flexural capacity and hence can be neglected
# (ERA BDM.2013 Art 7.7.1)
T_u > 0.25*Ø_mo*T_cr  # ...............(ERA 2013 eq.7.7.1.1-3)
# in which:- | T_u=factored torsion moment (N-mm)
# T_cr= torsion cracking moment (N-mm)
# Acp= total area in closed by outside perimeter of concrete cross-sectional (mm^2)
# Fpc= compressive stress in concrete at the pre stress losses have occurred either at the centroid of the x-sec.
# Ø= resistance factor for torsion
A_pc := (900*500)^2
P_c := 2*(900 + 500)
Ø_mo = 0.9
T_cr := 0.328*sqrt(f'_c)*A_pc/p_c*sqrt(1 + t_pc/(0.328*sqrt(f'_c)))
T_u > 0.25*Ø_mo*T_cr
# Hence, in line with the above stated Article 7.7.1 torsion effects shall be investigated for the exterior girder
# 3.5.2 Torsional design
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Given
# >>> Check the torsional resistance of the section
r - 0.16 == 0.74
Find(r) → 0.9
D_th := 0.9 m
W_th := 0.5 m
Area := W_th*D_th
u_per := 2*(D_th + W_th)
L_eff := Area/u_per = 0.160714 m
A_eff := (D_th - L_eff)*(W_th - L_eff) = 0.250829 m^2
U_eff := 2*((D_th - L_eff) + (W_th - L_eff)) = 2.15714 m
# For determining the capacity of the already designed section for torsional resistance, the following
# procedure should be followed.
# Detailing of designed section
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# Total area of longitudinal reinforcement available to resist torsion is;
A_long := 10*(π*Ø_32^2)/4 = 1539.38 mm^2
# From previous computations the analogs thin walled section are:-
h_eff := 160 mm
Ø_14 := 14 mm
X_o == W'
X_o := 0.34 m
γ_s := 1.15
A_leg := 10*(π*Ø_14^2)/4
Y_o == D'
Y_o := 0.74 m
S_g := 135 mm
γ_c := 1.5
# Hence assuming an angle of crack of 45^0 (ERA- BDM, 2013) (the minimum torsional possible
# moment without the yielding of the longitude reinforcement;
T_mom := A_long*(X_o*Y_o*f_yk/γ_s)/((X_o + Y_o)*(1/tan(45 deg)))
# Torsion that is resisted by the provided stirrup area will be;
T_mom2 := (2*X_o*Y_o*(1/tan(45 deg)))*A_leg*(f_yk/γ_s)/S_g
v_eff := max(0.7*(0.7 - f'_c/(200 MPa)), 0.35) = 0.42
# Hence the torque, that would cause diagonal compression failure at ɵ= 45^0 is;
T_w := 2*X_o*Y_o*t*(sin(45 deg)*cos(45 deg)*v_eff*f'_c)/γ_c
# Hence, it can be concluded that the section /beam does not require addition of longitudinal
# reinforcement to resist torsion as (684.27KNm>>199KNm).
# The design is also sufficient to resist the diagonal compression failure that could be
# caused due to the factored design torsional moment. (261.5KNm>>199KNm)
# S =100mm (i.e. from x=4.4 to 7.8m on both direction)
# Revised spacing of stirrups for the exterior girder
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# _______________  Skin Reinforcements___________________________________________________________________________
# 3.6 Skin Reinforcements
# The area of skin resistance A_sk (mm^2/m) on each face shall satisfy the following
A_sk := if(0.001*(d_s - 760) ≤ (A_s + A_ps)/1200, 0.001*(d_s - 760), (A_s + A_ps)/1200)
# Aps = area of pre stressing steel (mm2)
# As = area of tensile reinforcement (mm2)
# The requirements of skin reinforcement are based upon ACI 318 -95.For relatively deep flexural
# members, some reinforcement should be placed near the vertical faces in the tension zone to
# control cracking in the web Without such auxiliary steel, the width of the cracks in the web may
# greatly exceed the crack widths at the level of the flexural tension reinforcement
# (ERA-BDM,2013)
# Spacing of skin reinforcement
spac := min(d/6, 300)  # error: The forms of these values must match. This value has the form: Length, but others have the form: Unitless.
# hence, provide
Ø = 32 mm
# c/c
S_si = 120 mm
# 3.7 Fatigue stress limit (check for fatigue)
# Fatigue stress limit will be checked for the service load combination or conditions. The permissible
# stress range is given by the following equation ----- (ERA- BDM, 2013 Art. 9.6)
# Where; ff = the stress range in straight rebar caused by fatigue.
# ƒmin = the minimum live load resulting from the fatigue load combination.
# r/h = ratio of base radius to height of rolled on transverse deformation, if actual value is not
# known 0.3 should be used.
f_f := 145 - 0.33*f_min + 55*(r/h)
# Minimum fatigue stress (ƒ_min)
f_min := (M_LL_IM/(As_s*j*d))
# Minimum fatigue stress
f_min := (M_LL_IM/(As_s*j*d))
# following are some constants that will enable us to relate the fatigue limit with the
# reinforcement acquired in the previous procedures.
K := (ρ*n + 0.5*(tw/d)^2)/(ρ*n + (t_s/d))
# Minimum stress
f_min := (M_LL_IM/(As_s*j*d))
# Maximum stress
f_max := (M_LL_IM/(As_s*j*d))
# The actual stress range (delta) for fatigue will be
Δf_f := f_max - f_min
f_f := 145 - 0.33*f_min + 55*(r/h)
# ƒf >>∆ƒf -------- fatigue limit is greater than the actual stress range 127.5 >> 112.64
# Therefore the given section is free from fatigue failure
# 3.8 Serviceability requirement
# 3.8.1 Control of cracking by distribution of reinforcement
Z := 23*kN/m
d_d := D - (c_cm + Ø_12 + Ø_32 + Ø_24)
# Determine the area
A_df := b_w*2*Y'/n
f's_s := Z/(d_c*A)^(1/3)
# Maximum stress at service load combination
f_max := M_serv/(A_s*j*d)
if(f_all > f_max, "crack control is acheievable", "crack control is not achievebale") =  # error: This variable is undefined.
# hence, provide
Ø = 32 mm
# c/c
S_si = 120 mm
# _______________  Design of Interior Girder.__________________________________________________________________________
# 3.9 Design of Interior Girder
# 3.9.1 Design for flexure
# Factored moment
# Factored shear
# Effective compression flange width (for interior girder)
h'_f := 0.2 m
c_w := 1.8 m
b_w := 0.5 m
e_ct := 0.8 m
x_1g := 1/4*T_Lss = 3.9 m
u_1g := b_w + c_w = 2.3 m
y_1g := (2*6*h'_f) + b_w = 2.9 m
z_1g := b_w + (e_ct + c_w/2) = 2.2 m
B'_eff := min(x_1g, y_1g, u_1g, z_1g) = 2.2 m
# >>>. Check whether the beam is (should) be treated as T-section or rectangular section
d_d := D - (c_cm + Ø_12 + Ø_32 + Ø_24) = 998 mm
ρ := 1/2*(c_1 - sqrt(c_1^2 - 4*m/(c_2*b_e*d_g^2)))
x_x := ρ*m_m*d
y := 0.8*x_x
chk_T_sec := if(h_f > y, "Rectangular section", "T-Section")
# Design for flexure
M_ds := 2840.765 kN*m
# Compute the actual tensile bar ratio
# Actual tensile bar ratio
ρ := (1 - sqrt(1 - 2*M_Tot*m/(Ø_mo*b*d^2*f'_c)))*f'_c/f_yk = 4349.47 Pa
ρ_min := (0.03*f'_c/f_yk) = 2000 Pa
ρ_b := 0.8*ε_cu/(ε_cu + ε_s)*f_cd/f_yd
ρ_max := 0.75*ρ_b = 0.0146824
chk_ductility := if(ρ_min < ρ < ρ_max, "ductulity_okay", "not_okay")  # error: This value has units: Unitless, but must have units: Pressure.
chk_ductility =  # error
# Flexural Reinforcement area
A_s := ρ*b*d = 1.05257e9 Pa*mm^2
Ø := 32 mm
A_si := π*Ø^2/4 = 804.248 mm^2
n_ref := Round(A_s/A_si, 10)  # error: This value has units: Unitless, but must have units: Pressure.
# hence, provide
Ø = 32 mm
# c/c
S_si = 120 mm
# Check the adequacy of the width (bw) to accommodate five bars in a raw
c_c_c := 50 mm
# ????????????????????????????????
# ????????????????????????????????
# 3.9.2 Design of shear
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# From similarity of triangles
Given
753.85 kN/(7.8 kN) == v_d/((7.8 - 0.982)*kN)
Find(v_d) → 658.942217949*kN  # .....shear at a distance of d from the support at an inclination of 45^0
V_d := 658.942217949
# Now determine V_Rd, (diagonal concrete compression capacity)
V_rd := 0.25*f_cd*b_w*d
cross_section_chk := if(V_rd > V_d, "no_need", "increase_cross_seciton")  # error: This value has units: Unitless, but must have units: Force.
# Shear resistance capacity of concrete (V_c )
V_c := 0.083*b_w*sqrt(f'_c)
ϕ := 0.9
ϕ*V_c
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# from similarity of triangle
Given
753.85/7.8 == 183/x_xt
Find(x_xt) → 1.89348013531
# Spacing
A_vs := 226.08
f_yk := 300
b_w := 500
S_spacin := min(A_vs*f_yk/(0.4*b_w), d, 800 mm)  # error: The forms of these values must match. This value has the form: Unitless, but others have the form: Length.
# hence, provide
Ø = 32 mm
# c/c
S_si = 120 mm
# Shear reinforcement design
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V_av := (183 kN + 658.94 kN)/2 = 420.97 kN
Given
V_av/x == 1830/1.90
Find(x) → 437.072677596*N
# Shear reinforcement from x=1.90 to 4.40m
V_s := A_vs*f_yd*d/s
V_s := V_sd - V_c
V_sd := V_av - V_c  # error: This value has units: Length^1/2 · Mass^1/2 · Time^-1, but must have units: Force.
S := 2*A_vs*f_yd*d/V_s
# Therefore, from x=1.9 to x = 4.4
# hence, provide
Ø = 32 mm
# c/c
S_su = 150 mm
# Therefore, from x=1.9 to x = 4.4
# hence, provide
Ø = 32 mm
# c/c
S_si = 120 mm
# Reinforcement from x = 4.4 to support end
V_s := 753.85 - V_c  # error: This value has units: Length^1/2 · Mass^1/2 · Time^-1, but must have units: Unitless.
S := A_vs*f_yd*d/V_s
# Therefore, from x=1.9 to x = 4.4
# hence, provide
Ø = 32 mm
# c/c
S_si = 120 mm
# Maximum spacing
# The spacing of the transverse reinforcement shall not exceed the maximum permitted spacing S_max stated below
# (ERA BDM 2013 Art 7.7.1.5)
# f ?????????????????????????????????????????
# f ?????????????????????????????????????????
# f ?????????????????????????????????????????
# Summary of shear reinforcement with spacing (on both direction)
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# 3.9.3 Deflection
# Deflection calculation shall consider dead load, live load pre stressing, erection loads concrete
# creep and shrinkage and steel relation. (ERA- BDM-2013).
# The only deflections that are assessed are the ones caused by the live load and dead load.
# In the absence of a move comprehensive analysis, instantaneous may be computed using the
# modulus of elasticity for concrete and taking the gross moment of inertia ‘Ig’ as an effective
# moment of inertia I.e. (ERA BDM-2013 Art 7.8.2)
# 3.9.3.1 Computation of gross moment of inertia
# Centroid of cross section
# To simplify the computation, the cross fall of the bridge is neglected. I.e. the top slab is assumed
# to be flat. Bottom of girder is taken as a reference point for this calculation.
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# The structure is subdivided in to two subparts (namely slab and girder)
# Area for slab
A_slab := □
# Area for girders
A_gird := □
# Centroid of the slab parts; (bottom of the girder is the reference)
# For slab
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Yslb_i := □
# For girder
Ygir_i := □
Yslb_c := □
# Gross moment of inertia
I_gros := □
I_grosMnt := [1.78, 1, 0.28, 0.000486, 0.136, 0.1410; 1.8, 0.45, 0.27, 0.091125, 0.135, 0.2257]
# [component: outputs I_grosMnt]
# 3.9.3.2 Computation of effective moment of inertia
# An effective moment of inertia ‘Ie’ is given by
f'_r := 0.63*sqrt(f'_c*MPa)*MPa  # -------------- Art 7.3.2.6
M_cr := f_r*I_g/y_t
I_e := (M_ct/M_a)^3*I_g + (1 - (M_ct/M_a)^3)*I_cr  # ------- ERA BDM-2013 equation (7.8.2-1)
# Slab load
# The slab load includes, loads from sidewalk, slab, apparatus (guard rail)
# Sidewalk
S_wk := (t_sw*w*T_LS)*γ_con
# Slab deck
S_dek := □
# Guard rail
G_ral := □
# Overhang
O_vHng := □
# Total slab load
Tot_SlbLd := □
# >> Girder + diaphragm
# Girder
Tot_SlbLd := □
# diaphragm
Diph_SlbLd := □
W_TotSlbLd := □
# Load perimeter for which the deformation is going to be computed will be as follow.
# For slab.............................
W_TotSlbLd := □
w/lL =  # error
.
# For girder + diaphram ..........
W_TotSlbLd := □  # w/lf
# Total weight..........................
W_TotSlbLd := □
# Moment...............................
# Transformed section
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# Where.....
h_f := 0.25 m
c_w := 1.8 m
b_w := 0.5 m
e_ct := 0.8 m
x_1 := 1/4*T_Lss = 3.9 m
u_1 := b_w + c_w = 2.3 m
y_1 := (2*6*h_f) + b_w = 3.5 m
z_1 := b_w + (e_ct + c_w/2) = 2.2 m
B_eff := min(x_1, y_1, u_1, z_1) = 2.2 m
# Centroid of the transformed cross-section
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# Y_i for girder
Ygir_i := □
Yslb_c := □
# Centroid
Ygir_i := □
Yslb_c := □
# Compute the moment of inertia for the cracked section
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I_gros := □
I_grosMnt := [1.78, 1, 0.28, 0.000486, 0.136, 0.1410; 1.8, 0.45, 0.27, 0.091125, 0.135, 0.2257]
# _______________  Dead load deflection ___________________________________________________________________________
# 3.9.4 Dead load deflection
Δ_max := 5*W*L^4/(384*E*I)
facr := 3.0 - 1.2*(A_sr/A_s)
# In this particular case A_(s’) =0
# Therefor the long term deflection........
# 3.9.5 Live load deflection
# Experience with bridges
# designed under the previous indicated no adverse effects of live load deflections. (ERA BDM2013 Art 2.5.2.6.2)
# Deflection due to lane load
# W= (lane load) .............
Δ_max := 5*W*L^4/(384*E*I)
# Deflection due to truck loading
# We already have the axel configuration and the maximum bending moment point. I.e. from
# previous computations
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# Moment at c = maximum moment = 560.4 KNm
Δ_c := □
# Alternatively
Δ := □
# However according to ERA BDM -2013, Art 2.5.2.6.2 deflection shall be;
Δ_ERA := max(□, □)
# Therefor the maximum deflection due to live load = 10.81mm
# In the absence of other criteria, the following deflection limits shall be considered for concrete
# and/ a steel construction (ERA-BDM, 2013 Art 2.5.2.6)
#  Vehicular load, generally---------------------------
#  Vehicular and /or pedestrian loads -------------
# The project bridge shall follow the second limit. I.e. span/800
span/800
# Maximum allowable deflection due to the live load effect is 19.5mm
Δ_Max < Δ_Allow
chk_deflec := if(□, "deflection_is_okay", "check_defelction")
# Hence, the deflection caused by the dead load is in alignment with the limit set forth the
# manual.
# 3.9.6 REINFORCEMENT
# for this specific topic, the girder with the maximum moment is being referred.
# i) Bar cutting
# Development reinforcement/ developmental reinforcement
# The basic development length (ldb) in mm for bars with a diameter less than 5 is; (ERA BDM,sec9.4.3)
ldb := 0.02*a_s*f_y/sqrt(f'_c*MPa)  # ≥ 0.06 Ø fy ---------------- where Ø = 32, fy = 420 Mpa, fc’= 24
# The tension development length ld is; ----- ld= ldb * modification factor
# Lap splices of reinforcement in tension
Lap_splice := max(□, □)
# Flexural reinforcement extension length
d_eff := □
nom_dia := □
clea_sn := □
Lap_splice := max(□, □)
# CURTAILMENT
# At 0.1L
M_at1.56 := □
DL_at0.1L := □
LL_at0.1L := □
M_sd := 1.25*a + 1.75*b
μ_u := M_sd/(0.85*f'_c*U*b*d^2)
P_min := □
T_SteeL_ratio := □
A_smin := □
Numbre_of_br := A_s/A_smin
# Number of bars to be curtailed = 10 – 4 = 6 Ø32
# however from the principle of curtailment, more
# than 50% of bars should not be terminated at a point.
# Thus in accordance with that 5 Ø32 bars
# should be terminated at a sufficient development length ld, given by;
Id_Len := max(□, □, □)
# At 0.2L
# i.e. at 3.12m from support face
0.2*15.6 = 3.12
steel_ratio_tensi := (1 - sqrt(1 - 2*M_sd/(dia*b*d^2*f_cr))*f'_cr/f_yk)
p_min := □
# Ρmin > Ρactual ……. Hence, use the minimum tensile bar ratio.
A_s := p_min*b*d
n_i := A_s/a_s
# At this point, the section is similar with the point at 0.1L hence, for this section also 5 Ø32 bars
# should be terminated.
# At 0.3L
# i.e. at 4.68m from face of support
# _______________  Design of Cross Beam / Diaphram_________________________________________________________________
# 3.9.7 DESIGN OF CROSS BEAM/ DIAPHRAGM
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# Dead load
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# Load effects
# i) Load effects due to dead load
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# Live loads
# Loads effects due to live load action
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# Load combination
# Shear
# Moment
# Design for flexure
# 3.9.7.1 Design for flexure
# 3.9.7.2 Design for shear
# Maximum spacing
