# ____________________________Design Data and Specifications________________________________________________________
# 1.1 Material Properties
# Steel Strength,---- ----------------------------------------------------------
f_y := 400 MPa
# Concrete strength,----------------------------------------------------------
f'_c := 28 MPa
# Concrete density, f_y --------------------------------------------------------
γ_c := 2400*kg/m^3
# Bitumiinous Density --------------------------------------------------------
γ_b := 2250*kg/m^3
# Water Density -------------------------------------------------------------
γ_wtr := 1000*kg/m^3
# Water Unit weight --------------------------------------------------------
γ_w := 9.81*kN/m^3
# The modulus of elasticity of steel--------------------------------------
E_s := 200 GPa
# 1.2 Bridge Span and Support Dimensions
# Clear span of the bridge -----------------------------------------------------------------
C_s := 11 m
# Road way /clear carriage width --------------------------------------------------------
R_w := 7.32 m
# Bottom width of the concrete barrier/ post---------------------------------------
B_c := 0.35 m
# Curb width including B_c  ----------------------------------------------------------------
B_c_C.w := 1.18 m
# Additional curb width including bottom width of the
# concrete barrier/ posts  ---------------------------
C_w := 0.8 m
# Curb depth--------------------------------------------------------------------------------------
C_d := 0.25 m
# Bearing shelf width, f_y -------------------------------------------------------------------
W_rs := 0.5 m
# Girder Spacing-----------------------------------------------------------------------------
G_s := 0.5 m
# Diaphragm Spacing ----------------------------------------------------------------------
D_s := 5 m
# Number of Diaphragm/s  -------------------------------------------------------------
N_o_ds := 4
# Skewness  --------------------------------------------------------------------------------
s_kw := 0 deg
# Concrete Barrier wall is used --------------------------------------------------------
C_barr := 5*kN/m
# Thickness of Asphalt Layer (Wearing Surface) --------------------------------
W_s := 0.5 m
# Concrete Cover for the slab (bottom) ----------------------------------------------
Co_cover_btm := 0.5 m
# Concrete Cover for the slab (top)----------------------------------------------------
Co_cover_top := 0.5 m
# Concrete Cover for the girders--------------------------------------------------------
Co_cover_gird := 0.5 m
# Concrete posts and railings are used
# Railing depth --------------------------------------------------------
R_d := 0.3 m
# Railing width --------------------------------------------------------
R_ww := 0.15 m
# Post depth, f_y --------------------------------------------------------
P_d := 0.3 m
# Post width, f_y --------------------------------------------------------
P_w := 0.3 m
# Post height, f_y --------------------------------------------------------
P_h := 0.85 m
# Post spacing, f_y ------------------------------------------------------
P_s := 1.2 m
# Thickness of Asphalt Layer, f_y ----------------------------------------------
t_asL := 100 mm
# Concrete cover for the slab, f_y ---------------------------------------------
C_covr := 35 mm
# 1.3 Reinforcement Sizes
# Diameter of main reinforcement Concrete Cover for the girders --------------
ϕ_main_gir := 32 mm
# Diameter of main reinforcement for the slab -----------------------------------------
ϕ_main_slb := 16 mm
# Diameter of distribution reinforcement -------------------------------------------------
ϕ_dis := 16 mm
# Diameter of temperature reinforcement -------------------------------------------------
ϕ_temp := 12 mm
# Diameter of shear reinforcement ----------------------------------------------------------
ϕ_shear := 12 mm
# ** Design Method: LRFD
# * Specifications:
# AASHTO LRFD Bridge Design Specifications, 4th ed. 2007
# Ethiopian Roads Authority, ERA Bridge Design Manual, 2013
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# ____________________________Design of T-Girder  Bridge___________________________________________________________
# ____________________________Deck Design T-Girder __________________________________________________________
# 2.1 Typical Section
# 2.1.1) Deck Thickness
# Minimum recommended thickness of the slab, to control deflection is t_(s,min)=185 mm.(ERA BDM 2013, Article 5.4.1.1)
# Deck slab thickness not less than the clear span between fillets, haunches, or webs divided by 20, unless transverse ribs at a
# spacing equal to the clear span are used [AASHTO Art. 5.14.1.5.1a]
D := (S' + 3000 mm)/30  # Minimum recommended depth for continuous slabs
# AASHTO (Table 2.5.2.6.3-1)
# where: D is the thickness of the slab and S is c/c spacing of girders
t_s := □
# 2.1.2) Web Thickness
# Minimum thickness of the web, b_min=200 mm without prestressing duct. [AASHTO Art. 5.14.1.3.1c]
# Assume 4 bars in one row are used:
b := 4*ϕ_main_gir + 3*(1.5*ϕ_main_gir) + 2*Co_cover_gird
# 2.1.3)  Girder Depth (AASHTO Table 2.5.2.6.3-1)
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# Structural depth, Dw = 0.07L for simple span T- beams (L=C_s+W_rs)
d_w := 0.07*155500 = 10885
b' := 360 mm
d'_w := 1090 mm
# use
d_w := □
# 2.1.4) Girder Spacing and overhang
# Numbers of girders
N_g := floor(R_w/G_s) + 1
N_g := □  # ( Four girders with c/c spacing of 2.3 m are used.)
C_x := 0.5*(R_w - (N_g - 1)*G_s) = 0.16 m
# Where
B'_c := 0.35 m  # ------ Bottom width of the barrier
C_x := 0.21 m  # ----- distance from the edge of the curb to the centerline of the exterior girder (=0.21 m)
C_w := 0.83 m  # ------ Curb width
B_c + C_x + C_w = 1.39 m  # ------------------------  (Overhang)
# Number of lanes loaded ----------------
N'_g := floor(R_w/(3.65 m)) = 2
# 2.2  Deck Design
t_s := 200 mm  # ---------------- (deck thickness)
# 2.2.1) Weight of components
# 1.) Slab (200mm thick) ------------------------------------------
S_thick := 0.2*2400*9.81/1000 = 4.7088
# 2.) Wearing surface (100mm thick) -------------------------
W_sur := 0.1*2250*9.81/1000 = 2.20725
# 3.) Curb (250mm above slab) ---------------------------------
S_cu := 0.25*2400*9.81/1000 = 5.886
# 4.) Slab (200mm thick) -----------------------------------------
B_ar := 5*kN/m
# 2.2.2)  Dead load moments
# An approximate method of analysis in which the deck is subdivided into strips perpendicular to the supporting components
# shall be considered acceptable for decks. (AASHTO, Article 4.6.2.1.1)
# The strips shall be treated as continuous beams with span length equal to the c/c distance between girders. The girders are
# assumed rigid. For case in applying load factors, the bending moments will be determined for slab dead load, wearing surface
# and vehicle loads separately.
# 2.2.2.1) Slab dead load
# A one-meter strip width is taken for the analysis
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W_cb := 5.89
W_slb := 4.71
M_e := W_slb*C_x^2/2 + (W_slb + W_cb)*(C_w + B_c)*((C_w + B_c)/2 + C_x) + W_b*(0.5*B_c + C_w + C_x)
# Moment at supports
# Using Influence segment coefficent method, moment at supports become
M_b := coef*w*L^2 + coef*M_e
M_b == M_c == 4.71*(-0.1)*2.3^2 + 16.19*(-0.2) =  # error: This variable is undefined.
A_1 := □
B_1 := □
R_A := □
A_1 := □
B_2 := □
R_B := □
# where
# - influence segment coefficients for moment are obtained from Tables
# - M_e = End moment at support A (exterior girder)
# - M_b and M_c are support moments at supports B and C respectively
# - B_1, B_2, A_1 and A_2 are shear forces at the left and right of supports B and A respectively
# - R_B and R_A are reactions at supports B and A respectively
# 2.2.2.2) Wearing Surface
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M_ew := W_dw*C_x^2/2
# Moments at supports
M_bw == M_cw == 2.21*(-0.1)*2.3^2 + 0.05*(-0.2) =  # error
A_1 := □
B_1 := □
R_A := □
A_1 := □
B_2 := □
R_B := □
M_dw := 0.5*W_dw*(C_x + 0.4*G_s)^2 - R_A*(0.4*G_s)
# where
# M_dw= Span moment due to wt. of the wearing surface (at 0.4*Gs from the ext. girder)
# M_ew = end moment at support A due to wearing surface (exterior girder)
# M_bw and M_cw are support moments at supports B and C due to wearing surface respectively
# B_l, B_r are shear forces at the left and right of supports B respectively
# R_B and R_A are reactions at supports B and A respectively
# 2.2.2.3) Span Moment due to slab dead load and barrier wteight (at 0.4Gs from the ext. girder)
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R_A := □
M_xx := W_s*(C_x + x)/2 + W_t(C_w + B_c)*((C_w + B_c)/2 + C_x + x) + W_b*(0.5*B_c + C_w + C_x + x) - xR_A
# where
W_t := W_s + W_cb  # error: This value has units: Unitless, but must have units: Length.
# and
x := 0.4*G_s
# x= Span moment due to wt. of the wearing surface (at 0.4*Gs from the ext. girder)
# M_xs = Max span moment due to wt. of the slab, curbs and end barrier/posts (at 0.4Gs from the ext. girder)
# 2.3  Vehicular Live Load
# When decks are designed using the approximate strip method (Art. 4.6.2.1) and the strips are transverse, they shall
# be designed for the 145kN axle load (Art. 3.6.1.3.3). The design truck load shall be positioned transversely to produce
# maximum force effects.
# 2.3.1) Maximum Positive Live Load Moment
# For repeating equal spans, the maximum positive bending moment occurs near the 0.4 points of the first interior span.
# The equivalent width of the strip over which the live load is applied is:
E := 660 + 0.55*G_s  # error: This value has units: Length, but must have units: Unitless.  # (AASHTO, Table 4.6.2.1.3.1)
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0.4*G_s = 0.2 m
# Location of wheels for maximum positive live load moment
# Position of the second wheel = 0.4Gs+1.8 = 2.72m > 2.3m (on the second span)
table
# Using moment distribution method, the end moments become:
M_BA := -M_BC
# Reaction due to the above loading
R_a := □
R_b := □
R_b1 := □
M_maxp := □
R_b2 := □
M_p := □
R_a := □
R_b := □
# 2.3.2) Maximum Interior Negative live load moment
# The critical placement of live load for maximum negative moment is at the first interior support.
# The width of equivalent transverse strip is E=1220+0.25Gs (AASHTO, Table 4.6.2.1.3.1)
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# The equivalent width,------------------------
E := □
table
# Using moment distribution method, the end moments become:
M_BA == -M_BC := -30.497 kN*m  # error: A name is required here.
R_a := □
R_b := □
R_b1 := □
M_maxp := □
R_b2 := □
M_maxN := □
R_b := □
# 2.4  Select Resistance Factors
# Strength Limit States (RC)
# Flexure & Torsion
# >>>>>>  Resistance Factor is 1
R_fk := 1
# 2.5  Select Load Modifiers
# i) Ductility  -----------------------------------
d_u := 0.95  # -----[Art. 1.3.3]
# ii) Redundancy  --------------------------------
r_du := 1.05  # -----[Art. 1.3.4]
# iii) Importancy ----------------------------------
I_mp := 1.05  # -----[Art. 1.3.5]
# Load Modifier -----------------------------------
L_mod := max(d_u, r_du, I_mp) = 1.05
# 2.6  Select Applicable Load Combinations
# i) Strength Limit State
U := 0.95*(1.25*DC + 1.5*DW + 1.75*(LL + IM) + 1.00*(FR + TG))  # error: This '(' requires a matching ')'.
# 2.7  Investigate Strength Limit State
# Temperature gradient effect reduces gravity load effects.Because temperature gradient may not be there, assume TG=0
# Thus:-
U := 0.95*(1.25*DC + 1.5*DW + 1.75*(LL + IM) + 1.00*(FR + TG))  # error: This '(' requires a matching ')'.
# 2.8  Design Moment Computaions
M_maxp := 0.95*(1.25*M_xs + 1.5*M_dw + 1.75*1.33*M_p)
M_sup_B := 0.95*(1.25*(M_b + M_bb) + 1.5*M_bw + 1.75*1.33*M_n)
# For reinforcement computation, negative moment may be taken at the face of the support
# us, calculate moments at the face of support B (the width of the beam, b=360mm)
M_Dc := -4.831 kN*m/m
M_Dw := -0.757 kN*m/m
# and
M_LL := -13.747 kN*m/m
M_neg := 0.95*(1.25*(-4.831) + 1.5*(-0.757) + 1.75*1.33*(-13.747)) - 37.212 kN*m/m  # error: This value has units: Force, but must have units: Unitless.
# 2.9  Reinforcement
# 2.9.1)  Positive Moment Reinforcement
d_p := 167 mm  # (effective depth,dp=200-16/2-25)
M_maxp := 53.359 kN*m/m
ρ := (1 - sqrt(1 - 2*M_u/(0.9*b*d^2*ϕ*f'_c)))*ϕ*f'_c/f_y
ρ_min := 0.03*f'_c/f_y
ϕ := 0.85
# Checking the adequacy of the section
# The section is checked for the maximum design moment whether the initial depth under consideration is sufficed or not.
d_ic := sqrt(M_max/(0.254*b*f'_c))  # The section is sufficed!
ρ := 0.0056  # ( Using 16 mm diameter reinforcing bars)
ρ > ρ_min  # (ok!)!
A_s := 0.0056*1000*167 = 935.2
S := □  # ------>>>>>>  # use ϕ 16 c/c 210 mm  # ---- (As, provided =956.95 m^2)
# 2.9.2)  Negative Moment Reinforcement
d_n := 132 mm  # (effective depth,dn=200-16/2-60)
M_neg := □
ρ' := 0.0056  # ( Using 16 mm diameter reinforcing bars)
ρ > ρ_min  # (ok!)!
A'_s := 0.0056*1000*167 = 935.2
S' := □  # ------>>>>>>  # use ϕ 16 c/c 210 mm  # ---- (As, provided =956.95 m^2)
# 2.9.3) Distribution Reinforcement (AASHTO Article 5.14.4.1)
# The amount of distribution reinforcement at the bottom of the slab to distribute the loads may be taken as a percentage of the
# primary reinforcement and a minimum spacing of 250mm.
# P_e = Percentage of distribution reinforcement
# S_e = Clear spacing of girders = G_s-b
S_e := G_s - b
P_e := min(67, 3840/sqrt(S_e))  # error: The forms of these values must match. This value has the form: Unitless, but others have the form: Length^-1/2.
A_s := P_e*A_sp  # ----------- ( Using 12 mm diameter reinforcing bars)
S_di := min(a_si/1000, 250)
S_di := □
# Provide Φ 12 c/c 170 mm at bottom, longitudinal direction.
# 2.9.4)  Shrinkage and Temperature Reinforcement (AASHTO Article 5.10.8)
# Reinforcement for shrinkage and temperature reinforcement shall be provided near surfaces of concrete exposed to daily
# temperature changes. The steel should be distributed equally on both sides.
A_st ≥ 0.75*A_g/f_y
# where:-
# A_g is the gross concrete area
A_st := □
# Top layer
A_st := 1/2*375 = 187.5
Spacing := min(a_si*1000/A_st, 250, 3*t_s)
# Provide Φ12 c/c 450 mm at top, longitudinal direction.
# 2.10  Investigation of Service Limit State
# Actions to be considered at the service limit state shall be cracking, deformations, and concrete stresses, as specified in
# Articles 5.7.3.4, 5.7.3.6, and 5.9.4 respectively
# 2.10.1) Durability
# For durability, adequate cover shall be used (for bottom of cast in place slab, the cover is 25mm and 60mm cover at the top).
# Adequate concrete cover is provided here, thus there is no problem of durability.
# 2.10.1.1) Check positive moment reinforcement
# The load factors used above in all dead and live loads are taken as unity
# Thus,
M_p := □
# Reinforcement
A_s := M_p/(f_s*j*d_p)
# Asssume
j := 0.875
# and
f_s := 0.6*f_y
# Provide Φ 16 c/c 200 mm
# 2.10.1.2) Check negaitive moment reinforcement
M_n := □
# Reinforcement
A'_s := M_n/(f_s*j*d_n)
# Asssume
j := 0.875
# and
f_s := 0.6*f_y
# 2.10.2)  Control of Cracking
# The cracking stress shall be taken as the modulus of rupture specified in AASHTO, Article 5.4.2.6.
# Cracking may occur in the tension zone for RC members due to the low tensile strength of concrete. The cracks may
# be controlled by distributing steel reinforcements over the maximum tension zone in order limit the maximum allowable
# crack widths at the surface of the concrete for given types of environment.
# The tensile stress in the mild steel reinforcement (f _s) at the service limit state doesn’t exceed f_sa
f_s ≤ f_sa
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f_sa := Z/(d_c*A)^(1/3) ≤ 0.6*f_y
# where
d_c := conc_cover + (dia_bar/2)
# clear cover to compute dc≤50mm
# A_c =  area of concrete having the same centroid as the principal tensile reinforcement are bounded by the surfaces of the
# cross section and a line parallel the neutral axis divided by the number of bars (mm2), clear cover here also≤50mm.
# S= spacing of bars.
# f_r= modulus of rupture
f_r := 0.63*sqrt(f'_c*MPa) = 3.33365 MPa
0.8*f_r = 2.66692 MPa
# f_cten= tensile strength of the concrete
# If f_cten> 0.8f_r, the section has cracked (AASHTO, Article 5.7.3.4 and 5.4.2.6)
F_cten := 6*M_us/(b*D^2)
# If f _s > f _sa , then the area of reinforcing bars has to be increased by reducing the spacing of bars
# 2.10.2.1) positive moment reinforcement
E_c := 0.043*γ_c*sqrt(f'_c*MPa)  # -------------(Modulus Elasticity of concrete)
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n := 7
1/2*b*x^2 + (n - 1)*A_n*(x - d_2) == n*A_p(d_p - x)
I_cr := b*x^3/3 + (n - 1)*A_n(x - d_2) + n*A_p(d_p - x)^2
f_s := n*M_pu*(d_p - x)/I_cr
d_1 := 33 mm
d'_p := 167 mm
d_2 := 68 mm
d'_n := 132 mm
# where
# x is the neutral axis depth from top fiber
# M_pu= unfactored max positive moment
# I_cr = moment of inertia of the composite transformed section
# The equivalent concrete area
n*A_p =  # error
A_p := 1004.8 mm^2
S := 200 mm
n := E_s/E_c
d_2 := 68 mm
A_n := 873.74 mm^2
M_pu := 34.7999 kN*m/m
# Upon substitution, the corresponding values become:
x := □
I_cr := □
f_sa := □
f_s := □
f_s := □
chk_crack := if(f_s < f_sa, "No problem of cracking", "problem of cracking")
chk_crack := □
# Provide Φ16 c/c 200 mm
# 2.10.2.1) negative moment reinforcement
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# The equivalent concrete area:- | n*A_n
A''_p := 1004.8 mm^2
S'' := 200 mm
n' := E_s/E_c
d''_2 := 68 mm
A'_n := 873.74 mm^2
1/2*b*x^2 + (n - 1)*A_p*(x - d_2) == n*A_p(d_p - x)
d''_1 := 33 mm
d''_p := 167 mm
d''_2 := 68 mm
d'''_n := 132 mm
I_cr := b*x^3/3 + (n - 1)*A_p(x - d_2) + n*A_p(d_p - x)^2  # error: This value must be a function, but has the form: Length^2.
f_s := n*M_pn*(d_p - x)/I_cr
# where
# M_pn= unfactored max positive moment
# For top steel, dc=68 mm, A= 2*68*240 =32640mm2
f_sa := 23000/(d_c*A)^(1/3)
# fs > fsa (There is a problem of Cracking)
# Increase the amount of reinforcing bars provided (reduce the c/c spacing b/n bars)60
# Try S = 180 mm | As =1116.44 mm2
# An =1116.44mm2, S=180mm dn=132mm, n=Es/Ec =7, d1=33 mm, Ap =1004.8mm2, Mpn= -23.872 kN-m/m
# Upon substitution, the corresponding values become:
x := □
I_cr := □
f_sa := □
f_s := □
f_s := □
# fs= 180.19 MPa < fsa ( =194.16 MPa)
# No problem of cracking
# Thus, Provide Φ16 c/c 180 mm
# Investigation of Fatigue Limit State
# Fatigue need not be investigated for concrete decks in multi-girder applications. [AASHTO Art 9.5.3]
# ____________________________Design of Longitudinal Girder_________________________________________________________
# 2.11  Dead load effect due to web and diaphragm wt.
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# Structural depth ------------------------------------------------------
d_w := □
# Web width --------------------------------------------------------------
b := □
# Own weight of web ----------------------------------------------------
b*(d_w - t_s)*Y_c
# Assume the size of the diaphragm -----------------------------
h := 0.6 m
w := 0.25 m
# 4 diaphragms with c/c spacing of 5.2m is used. ------------
# (two diaphragms are provided at the ends)
spac := 5.2 m
# Diaphragm load on exterior girder  ---------------------------------
dia_ext := □
# Diaphragm load on interior girder ----------------------------------
dia_int := □
# 2.12  Slab reactions (dead loads & live loads) transferred to girders
# Exterior Girder
# Reactions
# DC:
ω_c == R_A == □
# DW:
ω_c == R_A == □
# Moments
# DC:
ω_c == R_A == □
# DW:
ω_c == R_A == □
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# Interior Girder
# Reactions
# DC:
ω_c == R_A == □
# DW:
ω_c == R_A == □
# Moments
# DC:
ω_c == R_A == □
# DW:
ω_c == R_A == □
# 2.13  Distribution factors for Moments and Shears
# The distribution factors for moment and shear for both external and internal girders are obtained from the empirical formula
# given in Table Art 4.6.2.2-1 of AASHTO 2007.
# 2.10.1) Distribution factors for Moment [Table4.6.2.2.2b-1 and d-1]
# a) Interior beams with concrete decks: | [Table Art 4.6.2.2b and 2b-1]
# Girder distribution factor with multiple presence factor included m_g is,
# One Lane loaded:
m_gon := 0.06 + (G_s/4.3)^0.4*(G_s/L)^0.3*(k_g/L*t_s^3)^0.1
# for preliminary design:------
(k_g/L*t_s^3) := 1  # error: A name is required here.  # and L is c/c of bridge length
# Two or more lanes loaded:
m_gtw := 0.075 + (G_s/2.9)^0.4*(G_s/L)^0.2*(k_g/L*t_s^3)^0.1
# Skew correction factor ---------------
C_1 := (G_s/L)^0.5*(k_g/(L*t_s^3))^0.25
sk_f := 1 - C_1*(tan(θ)^1.5)  # ---------
mg_m := 0.5  # and
mg_m2 := 0.67
sk_f := 1
# thus
m_gm := 0.5
# and
mg_m3 := 0.67
use := 0.67
# b) Exterior beams | [Table Art 4.6.2.2d and 2d-1]
# One lane loaded: Lever Rule
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R := 0.439*P
mg_m := 1.2*0.439 = 0.5268
# Two or more lanes loaded
mg_m := e*mg_me
# where:--
e := 0.77 + C_x/2.8  # error: This value has units: Length, but must have units: Unitless.
e := 0.845
e' := if(e < 1, 1, e) = 1
mg_m := 0.67
# 3.1.2 Distribution factors for Shear [Table 4.6.2.2.3a-1 and b-1]
# a) Interior beams
mg_v_sl := 0.36 + G_s/7.6  # error: This value has units: Length, but must have units: Unitless.
mg_v_ml := 0.2 + G_s/3.6 - (G_s/L)^2
# Skew correction factor ---------------
sk_f := 1 + 0.2*(k_g/(L*t_s^3))^0.3*tan(θ)
sk_f' := 1
mg_v_sl := 0.663
# and
mg_v_ml := 0.793  # use 0.793
# b) Exterior beams
# One lane loaded: Lever Rule
mg_v_se := 1.2*0.439 = 0.5268
# Two or more lanes loaded
mg_v_me := 3*mg_v_sl
# where :----------
e := 0.6 + C_x/3  # error: This value has units: Length, but must have units: Unitless.
e := 0.67
mg_v_me = 1.989
# Influence Lines for Bending Moment and Shear Force
# 2.14  Distributed Live Load Force Effects
# Single design vehicular load is considered
# i) Influence Line for Live Load Moment (Truck Load)
table
# ii) Influence Line for live Load Moment (Tandem Load)
table
# iii) Influence Line for Shear Force (Truck Load)
table
# iv) Influence Line for Shear Force (Tandem Load)
table
# 2.15  Select Resistance Factors
# Strength Limit States (RC)
# Flexure & Torsion
# Resistance Factor -----------
R_f := 1
# 2.16  Select Load Modifiers
# i) Strength Limit State
# i) Ductility  -----------------------------------
d'_u := 0.95  # -----[Art. 1.3.3]
# ii) Redundancy  --------------------------------
r'_du := 1.05  # -----[Art. 1.3.4]
# iii) Importancy ----------------------------------
I'_mp := 1.05  # -----[Art. 1.3.5]
# Load Modifier -----------------------------------
L'_mod := max(d_u, r_du, I_mp) = 1.05
# 2.17  Select Applicable Load Combinations
# i) Strength Limit State
U := L_mod*(1.25*DC + 1.50*DW + 1.75*(LL + IM) + 1.00*(FR + TG))  # error: This '(' requires a matching ')'.
# 2.18  Investigate Strength Limit State
# It is necessary to calculate moment and shear force at different locations to determine the bar cut off points and to calculate
# spacing of stirrups
# 2.19  Design Shear and Moment Computaions
# Distribution factors for moments and shear forces, mg is applied only on live load forces
# a) Interior Girder
# i) Shear Force
table
# ii) Moment
table
# 2.10.1)  Exterior Girder
# i) Shear Force
table
# ii) Moment
table
# V_dc and M_dc include shear and moment due to weight of the deck slab, overhang, end barriers, and diaphragms.
# Checking the adequacy of the section
# The section is checked for the maximum design moment whether the initial depth under consideration is sufficed or not.
# Interior Girder
MD := □
d_ic := sqrt(M_max/(0.254*b*f'_c))
chk_adequ := if(d_ic < d', "the section is sufficed", "section is not sufficed")
# Effective flange width, b_i
b_i ≤ {
    1/4*eff_spn
    12*t_min + b_w == 2.76
    avg_spac == 2.3 m
}
b_i := 2.3
# Check depth:
d := 400.925 mm  # -----  (The section is suficed!)
0.42*d = 168.388 mm
chk_sec := if(0.42*d < 200 mm, "Rectangular", "non_rectangular") = "Rectangular"
Effect_depth := 932 mm  # ------------- (bars in three layers)
# Exterior Girder
MD := □
d_ic := sqrt(M_max/(0.254*b*f'_c))
# Effective flange width, b_i
b_i ≤ {
    1/4*eff_spn
    12*t_min + b_w == 2.76
    avg_spac == 2.3 m
}
b'_i := 2.3
# Check depth:
d := 400.925 mm  # -----  (The section is suficed!)
0.42*d = 168.388 mm
chk'_sec := if(0.42*d < 200 mm, "Rectangular", "non_rectangular") = "Rectangular"
Effect'_depth := 932 mm  # ------------- (bars in three layers)
a_s := □
# Development length,
lb' := 1215.29 m
# 2.20  Reinforcement
# 2.20.1 Flexure
table
# Crack control
# Positive moment reinforcement- Interior Girder
M := □
# Reinforcement:
# Assume; j =0.875 and fs=0.6*f y
A_s := M_p/(f_s*j*d_p)
# Provide additional 1 Φ 32 length =2435 mm,
# Positive moment reinforcement- Exterior Girder
# Interior Girder
M := □
# Reinforcement:
# Assume; j =0.875 and fs=0.6*f y
A_s := M_p/(f_s*j*d_p)
# Provide additional 1 Φ 32 length =2435 mm,
# Cracking Moment of Inertia
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# Interior Girder
x_int := □
I_cr_int := □
# Exterior Girder
x_ext := □
I_cr_ext := □
# Interior Girder
f_s := □
f_sa := □
# Provide additional 1 Φ 32 length
len := 2435 mm
# Exterior Girder
f'_s := □
f'_sa := □
# Provide additional 1 Φ 32 length
len' := 2435 mm
# 2.20.2 Shear Design
# Nominal shear resistance
# The section is check for maximum shear and thus shear reinforcements are designed.
V_n := min(V_c + V_s, 0.25*f_c*b_v*d_v)  # where:  # Vn is the nominal shear strength
# Vc = shear strength provided by the shear reinforcement
V_c := 0.83*β*sqrt(f'_c*b_v)*d_v  # bv = effective web width
V_s := A_v*f_y*d/S  # dv = effective shear depth
# S = spacing of shear reinforcement
# Spacings
# Determine V_U (the design shear force) at a distance dv from face of support
S ≤ A_v*f_y*d_v*cot(θ)/V_s ≤ A_v*f_y/(0.083*b_v*sqrt(f_c))
# for
V_u < 0.1*f_c*b_v*d_v
S < 0.8*d_v < 600 mm
# for
V_u < 0.1*f_c*b_v*d_v
S < 0.8*d_v < 600 mm
# Interior Girder
d_v := max(d - a/2, 0.9*d, 0.72*D)
a := A_s*f_y/(0.8*f_c*b_eff)
V_s := V_u/ϕ - V_c
V_n := □
# and
f_c := □
V_n/f_c =  # error  # (<0.25) OK
ε_x := (M_D/d_v + 0.5*V_D*cot(θ))/(E_s*A_s) ≤ 0.002
# From chart
table
# Exterior Girder
d_v := max(d - a/2, 0.9*d, 0.72*D)
a := A_s*f_y/(0.8*f_c*b_eff)
V_s := V_u/ϕ - V_c
V_n := □
# and
f_c := □
V_n/f_c =  # error  # (<0.25) OK
ε_x := (M_D/d_v + 0.5*V_D*cot(θ))/(E_s*A_s) ≤ 0.002
# From chart
# table | table
# 2.20.3 Deflection and camber, AASHTO Article 5.7.3.6.2
# Deflection and camber calculations shall consider dead load, live load, erection loads, concrete creep and shrinkage. Immediate
# (Instantaneous) deflections may be computed taking the moment of inertia as either the effective moment of inertia Ie, or the gross
# moment of inertiaI Ig
# Unless a more exact deformation calculation is made, the long-term deflection due to creep and shrinkage may be taken as
# the immediate deflection multiplied by the following factor (AASHTO, Article 5.7.3.6.2).
# 4, if the instantaneous deflection is based on Ie
# if the instantaneous deflection is based on Ig
t_s := □
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# Interior Girder
D_w := □
Y_t_int := □
b_w := □
I_g_int := □
bi := □
b_e := □
M_cr_int := □
D_w - t_s =  # error  # Exterior Girder
Y_t_ext := □
f_r := 0.63*sqrt(f_c*MPa)
I_g_ext := □
M_cr := f_r*I_g/y_r
M_cr_ext := □
# Total moment due to dead and live load (unfactored)
# Interior Girder
MDU_int := □
# Exterior Girder
MDU_ext := □
# a) Dead load deflection and camber
# The effective moment of inertia is calculated using the following equation:
I_e := (M_cr/M_a)^3*I_g + (1 - (M_cr/M_a)^3)*I_cr ≤ I_g
# Interior Girder
I_cr_int := □
I_e_int := □
# Exterior Girder
I_cr_ext := □
I_e_ext := □
# Maximum Dead load moment
# Interior Girder
M_max_DL_int := □
# Exterior Girder
M_max_DL_ext := □
# The maximum dead load deflection of the girders is obtained by integrating twice the DL moment equation.
# Thus, the maximum dead load moment at the mid span becomes:
d_dl_int := 1/(E*I_e)*(17.86*x^3 - 0.58*x^4 - 2145.28*x)
d_dl_ext := 1/(E*I_e)*(46.5*x^3 - 1.5*x^4 - 5585.9*x)
camber := d_dl + long_deflect == 3*d_dl
camb := d_dl*(1 + 3)  # (average of interior and exterior girder)
# b) Live Load Deflection (AASHTO, Article 2.5.2.6.2)
d_max := L_1/800  # df (L1 is in mm);  # the permissible limit =19.375 mm
# Where
# L1: span length of the bridge in mm
# dmax : the permissible limit ( max. deflection)
# In the computation of live load deflection, design truck load alone or design lane load plus 25% of truck load is considered.
# i) Deflection due to truck load
# PLL1 =PLL2 = 145 kN
# PLL3 = 35 kN
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# t x1=8.525 m, Mtr =883.431 kN-m/m (Location of maximum truck load)
# The maximum deflection of the bridge due to truck load occurs at a wheel load position where moment is a maximum. In general, the
# deflection at the point of maximum moment, X 1, due to each truck load at a distance 'a' from the left support is given by:
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d_ki := P_LLi*b_x*(L_1^2 - b^2 - x^2)/(6*E_c*I_c*L_1)
# for
x ≤ a
# and
d_ki' := P_LLi*a*(L_1 - a)*x*(2*L_1*x - a^2 - x^2)/(6*E_c*I_c*L_1)  # for
x ≥ a
# where
# dki = deflection due to each truck load.
# a = location of the load to be considered
b := L_1 - a
x := L_1 - x_1  # ------ (x is the point where deflection is computed, for the first load, x=x1)
# and
I_e_ext := 45170000000
# ====
45170000000
I_e_int := 37010000000  # ====
= 3_701E+10
# a) First Load, PLL1
a := □
b := □
x := □
dk_1 := □
# b) Second Load, PLL2
a := □
b := □
x := □
dk_1 := □
# c) Third Load, PLL3
a := □
b := □
x := □
dk_1 := □
# Using the method of superposition, the total live load deflection due truck load is the sum of each deflections, dki’s.
dk_t := dk_1 + dk_2 + dk_3
# Thus Interior girder,
sum(dk_i) := □
# Similarly for exterior girder,
dk_1 := □
dk_2 := □
dk_3 := □
dk_t := dk_1 + dk_2 + dk_3
sum(dk_i) := □
# ii) Deflection due to tandem load
# The max. deflection of the interior girder due to tandem load occurred when a single concentrated tandem load is acting at the mid span.
d_tl := P_stl*L_1^3/(48*E_c*I_c)
# where | dtl = deflection due to tandem load.
# Pstl = Single concentrated tandem load =110kN
d_tl := 2*110*15.5^3/(48*990026.77) = 0.0172397
# iii) Deflection due to lane load
W_L1 := □
d_La := 5*W_L1*L_1^4/(384*E*I_e)
# Thus, the total live load deflection becomes:
d_k := 0.25*d_kt + d_la  # (for 25% of truck load)
d_max := m_g*d_kt  # The deflection is within the limit
# 2.20.4 Investigation of Fatigue Limit State (AASHTO, Section 5.5.3)
# Magnitude and Configuration of Fatigue Load
# The fatigue load shall be one design truck or axles thereof specified in Article 3.6.1.2.2, but with a constant spacing of 9000mm
# between the 145 000-N axles. The dynamic load allowance specified in Article 3.6.2 shall be applied to the fatigue load.
U := 0.75*(LL + IM)
F_s := 0.75  # F.S for LL is 0.75
# U= Fatigue load shall be one design truck with 9m spacing
# Maximum moment results when the two front axles are on the span and the rear axle is out of the span.
M_mf := 0.75*1.15*M_max
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# Mmax occurs at x = 8.1375 m and equals to 624.269KN-m
Mg_m := 0.5/1.2 = 0.416667
M_mf := 0.75*1.5*Mg_m*M_max
# a) Tensile live load stresses
# for interior girder
d := □
x := □
I_cr := □
f_s_max := n*M_llf*(D - x_2)/I_cr
# b) Reinforcing Bars
# The stresses range in straight reinforcement bars resulting from fatigue load combination shall not exceed
# (AASHTO, Section 5.5.3.2).
# If fsmax < ff , then there is no problem of fatigue. Otherwise increase the area of reinforcing bars.
# where
# f f is the stress range.
# f min is the minimum live load stress resulting from fatigue load, combined with the more severe stress from permanent loads. For
# simplly supported slab bridge f min is zero.
f_f := 166 - 0.33*f_min
f_s < f_f*(41.778 < 166 MPa)  # OK !!
# ____________________________Design of Bearing  _______________________________________________________________
# 3 Design of Bearing
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# Strength limit state and extreme event limit state are considered for the design of barriers. The design forces
# for a TL-4 barrier as per AASHTO: Table A13.2.1 is used.
Barrier_height := 0.85
top_width := 150
cover := 25
bottom_width := 350
# Design forces for a TL-4 barrier (AASHTO: Table A13.2.1)
table
F_t == R_w
R_w := 2/(2*I_c - L_t)*(8*M_b + 8*M_w + M_c*L_c^2/H)  # and
L_c := l_t/2 + sqrt((L_t/2)^2 + 8*H*(M_b + M_wH)/M_c)
# Where
# Mb - additional flexural resistance of beam in addition to Mw, if any, at top of wall (kN-m)
# Mw - flexural resistance of the wall about its vertical axis (kN-m)
# Mc - flexural resistance of cantilevered walls about an axis parallel to the longitudinal axis of
# the bridge (kN-m/m)
# H - height of wall
# Lt- longitudinal length of distribution of impact force, Ft (kN)
# Lc - critical length of yield line failure pattern (m)
# i) Flexural capacity of the wall about vertical axis, M_w
# diam of horizontal bars --------------------------------------------
# Assume c/c spacing for horizontal bars (mm) -----------
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# * bar 1 is on the inside face and bar 2 is on the outside face
# * Provide 5φ10 horizontal bars, L= 16120mm on both faces (spacing of bars is as shown in the
# above diagram)
M_w := ϕ''*A_s*f_y*(d - a/2)
# for extreme limit state
ϕ'' := 1
ϕ*10
A := 78.5 mm^2
A_s_tot := n_b*A
a := A_s_tot*f_y/(0.85*f_c*b)
# calculation of M._w
table
M_wi := M_w1/H
M_wo := M_w2/H
# thus
M_w := 2*(M_wi + M_wo)/3
# ii) Flexural capacity of the wall about horizontal axis, M_c
# diam of vertical bars --------------------------------------------
# Assume c/c spacing for vertical bars (mm) -----------
# number of bars -------------
n_b := □
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M_w := ϕ''*A_s*f_y*(d - a/2)
# for extreme limit state
ϕ'' := 1
ϕ*10
A := 78.5 mm^2
A_s_tot := n_b*A
a := A_s_tot*f_y/(0.85*f_c*b)
a := □
# calculation of M._c
table
# thus
M_c := sum(M_ci*H_i)/sum(H_i)
L_c := L_t/2 + sqrt((L_t/2)^2 + 8*H*(M_b + M_w*H)/M_c)
M_b := 0
R_w := 2/(2*L_c - L_t)*(8*M_b + 8*M_w + M_c*L_c^2/H)  # ( >240kN)  # OK!!!
# 3 Design of Bearing (Using 60 durometer reinforced bearing)
# Design Data:
# Expandable span length of the bridge ------------------------------
# Dead Load reaction/girder --------------------------------------------
# Exterior girder -----------------------------------------------
# Interior girder -------------------------------------------------
# Live Load reaction (without inpact)/girder ------------------------
# Maximum temperature change -------------------------------------
# Girder shortening due to concrete shirinkage -----------------
# Shear modulus of elastomer ---------------------------------------
# Constant amplitude of fatigue treshold for Category A ----------
# 1. Temperature Movement
# Thermal coefficient of normal concrete
# 2. Girder Shortening
# Bearing maximum longitudinal movement
# 3. Determination of the minimum bearing area
# According to S14.7.5.3.2, the maximum compressive stress limit under service limit state for bearings fixed
# against shear deformations:
σ_s ≤ 1.66*G_s ≤ 11 MPa
σ_L ≤ 0.66*G_s
# where:
# σs = service average compressive stress due to the total load (MPa)
# σL = service average compressive stress due to live load (MPa)
# G = shear modulus of elastomer (MPa)
# S = shape factor of the thickest layer of the bearing
# To satisfy the 11MPa limit, the minimum bearing area, Areq, should satisfy:
A_req > (298.499 + 267.582)*1000/11 =  # error  # (mm^2)
# For a first estimate,
# -choose a width of W=(Width of girder bottom flange – 2(chamfer +edge clearance)
W := □
# >>>>>
# Trial size of bearing is 310mm x 260mm
A := 80600 > 51461.91  # ((OK!)!)
# The shape factor of a layer of an elastomeric bearing, Si, is taken as the plan area of the layer divided by the
# area of perimeter free to bulge.
S_i := L*W/(2*h_ri*(L + W))
# where
# L = length of a rectangular elastomeric bearing (parallel to the longitudinal bridge axis) (mm)
# W = width of the bearing in the transverse direction (mm)
# h_ri = thickness of ith elastomeric layer in elastomeric bearing (mm)
# 4.Compressive stress
# Shape factor under total load, S_TL,(S14.7.5.3.2-3)
S_TL ≥ σ_s/1.66*G
# where:
σ_s := P_TL/A_req
# P_TL= maximum bearing reaction under total load
# STL> (566.081*1000/80600)/(1.66*1)
# > 4.23
# Thus, the minimum shape factor of any layer is 5.03
# Notice that if holes are present in the elastomeric bearing their effect needs to be accounted for when
# calculating the shape factor because they reduce the loaded area and increase the area free to bulge.
# 5.Elastomer Thickness
# Using the shape factors of STL and SLL calculated above, determine the elastomer thickness.
h_ri_TL < (L*W)/(2*S_TL*(L + W))
h_ri_LL < (L*W)/(2*S_LL*(L + W))
# >>>>> | use an interior elastomer layer thickness of h_ri=14mm
# The corresponding shape factor is:
S := (L*W)/(2*S_LL*(L + W))
# Check compressive stresses
# - average compressive stress due to toal load
σ_s := P_TL/A
# i.) σs=7.02MPa < 1.66GS(=8.38MPa) Ok!
# ii.). 1.66GS (=8.38MPa) < 11MPa Ok!
# - average compressive stress due to live load
σ_s := P_TL/A
# i. σs=3.32MPa < 0.66GS (=3.33MPa) Ok!
# 6. Compressive deflection
# Deflections of elastometric bearings due to total load and live load alone will be considered separately
# Instantaneous deflection is be taken as:
δ := sum(ε_i)*h_ri
# where: ε_i = instantaneous compressive strain in ith elastomer layer of a laminated bearing
# h_ri = thickness of ith elastomeric layer in a laminated bearing
# Values for εi are determined from test results or by analysis when considering long-term deflections.
# Obtain εi from Fig. C14.7.5.3.3.1 of AASHTO
# For σs=7.02MPa and S=5.05, the value of εi= 0.0564
# 7. Shear deformation
# The bearing is required to satisfy:
h_rt ≥ 2*Δ_s  # (S14.7.5.3.4-1)
# where
# h_rt =total elastomer thickness (sum of the thicknesses of all elastomer layers)
# Δ_s =maximum shear deformation of the elastomer at the service limit state
# 8. Combined compression and rotation
# Rectangular bearings are assumed to satisfy uplift requir ements if they satisfy:
σ_s > 1.0*G_s*(θ_s/n)*(B/h_ri)^2
# where
# n = number of interior layers of elastomer (interior layers are bonded on each face).
# hri, thickness of ith elastomeric layer =14 mm
# σs =maximum compressive stress in elastomer =7.02MPa
# B = length of pad if rotation is about its transverse axis or width of pad if rotation is about its
# longitudinal axis. B=L=260mm
# θs = maximum service rotation due to the total load (rads).
# It will include the rotations due to live load and construction load (assume 0.005 rads)
# The rotation at a point , x, due to each live load at a distance 'a' from the left support is given by:
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EIθ(x) := P*b*x^2/(2*L) - P*b/(6*L)*(L^2 - b^2)  # (for x<a)
# Thus, the rotation at the left support is obtained by setting x=0
EIθ(0) =  # error
table
# Rotation due to DL
θ_DC := -w*L^3/(24*E*I_e)
table
# Long term rotation produced by creep effect should be considered in the calculation of camber.
θ_dL := 3*θ_DC
θ_design := m_g*θ_LL == θ_dL + θ_alw
# 8.1 Uplift requirement
# To determine the number of interior layers of elastomer, nu, for uplift
n_u > 1.0*G*S*θ_s*(B/h_ri)^2/σ_s
# 8.2 Shear deformation requirement
# To prevent excessive stress on the edges of the elastomer, rectangular bearings fixed against shear
# deformation must also satisfy:
σ_s < 1.875*G*S*(1 - 0.2*(θ_s/n)*(B/h_ri)^2)
# The number of interior layers of elastomer, nc,required to limit compression along the edges
n_e > (-0.2*θ_s*(B/h_ri)^2)/(σ_s/(1.875*G*S - 1))
# > 5.41
# Use 6 interior layers, 14mm thick each
# Exterior layers 9mm thick each (< 70% of the thickness of the interior layer)
# 9. Bearing maximum rotation
# Instantaneous deflection is :
δ := sum(ε_i)*h_ri  # ( εi=0.0564)
δ := 7*□
# Bearing rotational capacity:
θ_capacity := 2*δ/L
θ_design := 0.0203 rad  # (< 0.043 rad) OK!
# 10. Stability of elastomeric bearings
# The bearing pad should be designed to prevent instability at the service limit state by limiting the average
# compressive stress to one half the estimated buckling stress
# For the bridge deck free to translate horizontally
# and
B' := 2.67/(S*(S + 2)*(1 + L/(4*W)))
σ_s ≤ σ_cr == G/(2*A - B)  # where,
A' := 1.92*h_rt/L/(S*sqrt(1 + 2*L/W))
h_rt := □
A' := □
B' := □
G/(2*A - B) > (7.02 MPa)  # The bearing is stable
# 11. Bearing Steel Reinforcement
# The reinforcement should sustain the tensile stresses induced by compression on the bearing. With the
# present load limitations, the minimum steel plate thickness practical for fabrication will usually provide
# adequate strength.
# At the service limit state:
h_s ≥ 3*h_max*σ_s/f_y  # -------------- (S14.7.5.3.7-1)
# where :
# hmax = thickness of thickest elastomeric layer in elastomeric bearing
# hmax=14 mm, σs=7.02MPa
# Fy = yield strength of steel reinforcement = 400MPa
# >>>>>>>
h_s_TL ≥ 0.74 mm
# At the fatigue limit state:
# hmax = thickness of thickest elastomeric layer in elastomeric bearing
# hmax=14 mm, σs=7.02MPa
# Fy = yield strength of steel reinforcement = 400MPa
# If holes exist in the reinforcement, the minimum thickness is increased by a factor equal to twice the
# gross width divided by the net width. Holes in the reinforcement cause stress concentrations.
# The total height of the bearing, hrt :
# hrt = cover layers + elastomer layers + shim thicknesses
# 6 interior layers, 14mm thick each
# 2 Exterior layers 9mm thick each
# 7 steel reinforcement plates. hs= 1 mm thick each
# Total thickness of bearing is 109 mm 0 38 38
# Bearing size: 310mm (transverse) x 260mm (longitudinal)
# ____________________________Abutment design  __________________________________________________________________
# Dimensions and Material Properties
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# Calculations
# Bottom width of the foundation on the left side----------------
BL_1 := □
# Bottom width of the toe on the right side------------------------
BL_3 := □
# slope -------------------------------------------------------------------------
V_H := □
# Top width of the abutment cap-------------------------------------
x := □
# Depth of the abutment cap------------------------------------------
B_fl := □
# Depth of the base concrete------------------------------------------
h_t := □
# Depth of the base concrete---------------------------------------------
h_h := □
# Top height of the abutment---------------------------------------------
H := □
# Allowable stress of the foundation Soil,-----------------------------
q_all := □
# Friction angle of the backfill material--------------------------------
δ := □
# Density of the backfill material,---------------------------------------
γ_bm := □
# Cohesion of the backfill material-------------------------------------
C := □
# Unit weight of the abutment-------------------------------------------
γ_m := □
# Unit weight of the abutment cap-------------------------------------
γ_ac := □
# Soil thickness (surcharge)---------------------------------------------
t_s := □
# Percentage of creep, shrinkage & temperature------------------
# 10 % of DL
# Passive Pressure is considered.
# Height--------------------------------------------------------------------------
H_2 := □
# 3.3.2__CALCULATIONS
# 1) DIMENSIONS
# Net height of the abutment,
H_net := (H - t_s)
H_l := H_net - h_h - B_fl
B_l := H_l/slope
B_L2 := B_l + W_rs + x
B_2 := W_rs + x
B := BL_1 + BL_2 + BL_3
# 2) LOADS
# i) Dead Load Reaction
R_dl := (W_dc + W_dw)*L_1/2
# ii) Live Load Reactions
R_lli := 2*E_e*(max(V_tre, V_tmel) + V_ln) + (R_wt - 2*E_e/1000)*(max(V_tr, V_tml) + V_ln)
# iii) Wind Load on Live Loads
WL := 1.46*(H_l + 1.8)  # ---------1.8m above roadway surface.
# iv) Breaking Force, Brf
B_rf := 0.25*(2*P2 + P1)*NL  # ----------,Braking force,25%, 1.8m above roadway surface.
# v) Creep, shrinkage & temperature...(10% of DL)
CR_SH_TU := □
# vi) Lateral active earth pressure
q_ult := 1.5*q_all
ϕ := 1.5*δ
θ := 180 deg - tan(H1/B1)^-1
η := (1 + sqrt(sin(δ + θ))*sin(ϕ))/(sin(δ + θ)*sin(θ))^2
K_a := sin(ϕ + θ)^2/(η*sin(θ)^2*sin(θ - δ))
γ := 180 deg - (δ + θ)
P_max := k_a*γ_bm*H_net - 2*C*sqrt(K_a)
P_a := 0.5*P_max*H_net
P_ah := P_a*sin(γ)
P_av := P_a*cos(γ)
# vii) Lateral passive earth pressure
K_p := 1/K_a
P_maxp := k_p*γ_bm*H_net + 2*C*sqrt(K_p)
P_p := 0.5*P_maxp*H_2
P_ph := P_p*sin(γ)
P_pv := P_p*cos(γ)
# viii) Dead load Surcharge
q_ss := γ_bm*t_s
Pressure_DL := k_a*q_ss
Q_sh := k_a*q_ss*sin(γ)
Q_sh := k_a*q_ss*cos(γ)
# xi)  Live load Surcharge
Pressure_LL := k_a*h_eq*γ_bm
Q_lh := Pressure_LL*sin(γ)
Q_lh := Pressure_LL*cos(γ)
# 3) LOAD COMBINATIONS
# Strength I:
DC := 1.25
LL := 1.75
ES := 1.5
CR_SH_TU := 0.5
EV := 1.35
BR := 1.75
WL := 0
EH := 1.5
LS := 1.75
WS := 0
# Strength Ia:
DC' := 0.9
LL' := 1.75
ES' := 0.75
CR_SH_TU' := 0.5
EV' := 1
BR' := 1.75
WL' := 0
EH' := 0.9
LS' := 1.75
WS' := 0
# Total Width of the abutment = 8.92m
table
# Stability and Safety Criteria
# 1 Eccentricity
table
# 2 Sliding
table
# 3 Bearing Capacity
table
